# Задача 1.36
d2 := 0.008
δ := 0.001
λl := 110  # труба латунь
b := 0.06
δp := 0.0003
λa := 100  # ребра алюминий
s := 0.004  # шаг ребер
tg1 := 35
tg2 := 20
α2 := 50
# α1 >> α2
α1 := 1000
Q := 3500
L == □
d1 := d2 - 2*δ
np := 1/s  # число ребер на 1 п.м. трубы
# Далее ведем расчет для 1 п.м. трубы с ребрами
FgL := π*d2 - np*(π*d2*δp)  # площадь оставшейся гладкой внешней поверхности трубы
F1 := π*d1  # площадь внутренней поверхности трубы
Fp := np*2*(b^2 - π*d2^2/4)  # площадь боковой поверхности ребер
Fop := FgL + Fp  # площадь оребренной поверхности
ϕ := Fop/F1  # коэффициент оребрения
# приведенный к внутренней поверхности трубы КТП оребренной стенки
k1 == 1/(1/α1 + d1*ln(d2/d1)/(2*λl) + 1/(αpr*ϕ))
# Из указания к задаче 1.36 (см. стр.20 Задачника)
u == 2*4*(b + δp)
m := sqrt(2*α2/(λa*δp))
sqrt(α*2*4*(b + δp)/(λ*4*b*δp)) == sqrt(α*2/(λ*δp))
f == 4*b*δp
# δp << b
p := 1.15*b/d2
lp := 0.5*d2*(p - 1)*(1 + 0.35*ln(p))
E := tanh(m*lp)/(m*lp)
αpr := α2*(FgL/Fop + E*Fp/Fop)  # КТО оребренной поверхности
α1 =  # no stored result
k1 := 1/(1/α1 + d1*ln(d2/d1)/(2*λl) + 1/(αpr*ϕ))
α1 := 10000
k1 := 1/(1/α1 + d1*ln(d2/d1)/(2*λl) + 1/(αpr*ϕ))  # КТП оребренной трубы, приведенный к  площади внутренней поверхности F1
limit(1/(1/α1 + d1*ln(d2/d1)/(2*λl) + 1/(αpr*ϕ)), α1 → ∞) → 1560.18818859
k1 := 1560
Q1 := k1*(tg1 - tg2)*F1  # Тепловой поток с 1 п.м. оребренной трубы
# Ответ :
L := Q/Q1
