# Задача 1.37
d2 := 0.032
δ := 0.005
λs := 400
# труба сталь  табл. П2 Задачника
Dp := 0.058
δp := 0.0012
λp := 400  # ребра сталь
s := 0.0048  # шаг ребер
L := 1
# Индексы | 1 - вода | 2 - дымовые газы
tg1 := 270
tg2 := 450
α1 := 5200
# а ) экономайзер гладкотрубный
α2 := 115
# б ) экономайзер оребренный
α2 := 85
αp := α2 = 85
Q == □  # с одного погонного метра трубы
d1 := d2 - 2*δ = 0.022
# а ) Экономайзер гладкотрубный
Q == qL*L
qL == kL*π*(tg1 - tg2)
kL := 1/(1/(α1*d1) + 1/(2*λs)*ln(d2/d1) + 1/(α2*d2)) = 2.65353
qL := kL*π*(tg1 - tg2) = -1500.54
# знак показывает направление теплового потока внутрь труб от дымовых газов к воде
Qа := |qL|*L = 1500.54
# б ) Экономайзер оребренный по наружной поверхности
np := ceil(1/s) = 209  # число ребер на 1 п.м. трубы
# Далее ведем расчет для 1 п.м. трубы с ребрами
FgL := π*d2 - np*(π*d2*δp) = 0.0753178  # площадь оставшейся гладкой внешней поверхности трубы
F1 := π*d1 = 0.069115  # площадь внутренней поверхности трубы
Fp := np*2*(π*Dp^2/4 - π*d2^2/4) = 0.768214  # площадь боковой поверхности ребер
Fop := FgL + Fp = 0.843531
# площадь оребренной поверхности
ϕ := Fop/F1 = 12.2047  # коэффициент оребрения
к1 == 1/(1/α1 + d1*ln(d2/d1)/(2*λs) + 1/(αpr*ϕ))  # приведенный к внутренней поверхности трубы КТП оребренной стенки
# Из указания к задаче 1.37 (см. стр.20 Задачника)
m := sqrt(2*αp/(λp*δp)) = 18.8193
h := 0.5*(Dp - d2) = 0.013
lp := h*(1 + 0.35*ln(Dp/d2)) = 0.0157059
E := tanh(m*lp)/(m*lp) = 0.971861
αp = 85
# КТО оребренной поверхности
αpr := αp*(FgL/Fop + E*Fp/Fop) = 82.8218
к1 := 1/(1/α1 + d1*ln(d2/d1)/(2*λs) + 1/(αpr*ϕ)) = 838.99
Q := к1*(tg1 - tg2)*F1 = -10437.6  # Тепловой поток с 1 п.м. оребренной трубы
# Ответ :
Qа = 1500.54
Qб := |Q| = 10437.6
Qr := Qб/Qа = 6.95594
