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# Дано | Вт/(м*К)
tв := -5  # С
λмв := 0.055
d2 := 120*10^-3  # м
δ := 3*10^-3  # м
w := 0.72*10/36  # м/с
δмв := 35*10^-3  # м
tж1 := 130  # C
λб := 0.9  # Вт/(м*К)
ε := 0.78
p := 5*10^6  # Па  # м
α := 0.6  # Вт/(м^2*К)
δб := 35*10^-3
tж2 := 130 - 35 = 95  # C
λст := 14.4  # Вт/(м*К)
# Взято из учебника Цветков Ф Ф Григорьев Б А П2 сталь нержавеющая
# 1Х18Н9Т
# Изобарнрую теплоёмкость воды при t=130 C p=5 Мпа найдем с помощью расчётного сервера изобарной теплопроводности воды кафедры ТВТ НИУ МЭИ http://twt.mpei.ac.ru/MCS/Worksheets/rbtpp/tab6.xmcd
# Плотность при температуре найдем при помощи таблицы №3 учебника
# t=130 C p=5 Мпа Cp=4.252*10^3 Дж/(кг*К) ρ=934.8 кг/м^3
# t=95 C Cp=4.2*10^3 Дж/(кг*К) ρ=965.3 кг/м^3
Cp := (4.252 + 4.2)/2*10^3 = 4226
# Средние значения изобраной теплоемкости и плотности
ρ := (934.8 + 965.3)/2 = 950.05
Gm := π*((d2 - 2*δ)/2)^2*w*ρ = 1.93944  # кг/с
t(x, k) := tв + (tж1 - tв)*e^(-(k*π*x/(Gm*Cp)))
# Бетоное покрытие
d1 := d2 - 2*δ = 0.114
d3 := d2 + 2*δб = 0.19  # м
# Аналогично и для d3 мин войлока
# так как δб=δмв
kб := 1/(1/(α*d1) + 1/(2*λст)*ln(d2/d1) + 1/(2*λб)*ln(d3/d2) + 1/(α*d3)) = 0.0422853
Given
tж2 == tв + (tж1 - tв)*e^(-(kб*π*x/(Gm*Cp)))
Find(x) → 18515.6540476
L := 18515.6540476  # Метров
# минерально-войлоковое покрытие
kмв := 1/(1/(α*d1) + 1/(2*λст)*ln(d2/d1) + 1/(2*λмв)*ln(d3/d2) + 1/(α*d3)) = 0.0362698
t(L, kмв) = 99.3617  # C
# Без изоляции
kби := 1/(1/(α*d1) + 1/(2*λст)*ln(d2/d1) + 1/(α*d2)) = 0.0350747
t(L, kби) = 100.251  # C
# Тепловой поток | Линейная плотность теплового потока
ql(x, k) := k*π*(t(x, k) - tв)
Q(x, k) := k*π*(t(x, k) - tв)*x
# Без покрытия
Q(L, kби) = 214738  # Вт
ql(L, kби) = 11.5976  # Вт/м
# Минерально-войлоковое покрытие
Q(L, kмв) = 220179  # Вт
ql(L, kмв) = 11.8915  # Вт/м
# Бетонное покрытие
Q(L, kб) = 245968  # Вт
ql(L, kб) = 13.2843  # Вт/м
Given
# Расчёт другим способом
qlm2(k) := k*π*((tж1 + tж2)/2 - tв)
k*π*((tж1 + tж2)/2 - tв)*x == π*(d1/2)^2*w*Cp*ρ*(tж1 - tж2)
# Уравнение баланса энергий
Find(tж2) → -(219.911485751*k*x - 1065488.79528)/(1.57079632679*k*x + 8196.06765601)
Q == Gm*Cp*(tж1 - tж2) == π*(d1/2)^2*w*ρ*Cp*(tж1 - tж2) == ql*l
# Бетонное покрытие
Given
qlm2(kб)*l == π*(d1/2)^2*w*Cp*ρ*(tж1 - tж2)
Find(l) → 18377.9300431
L := 18377.9300431  # Метров
tn2(k, x) := -(367.56634047*k*x - 20746046.3089)/(1.57079632679*k*x + 90200.2013431)
# Минерально - войлоковое покрытие
tn2(kмв, L) = 224.676  # C
# Без изоляции
tn2(kби, L) = 224.849  # С
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qn2(k, x) := k*π*((tж1 - (367.56634047*k*x - 20746046.3089)/(1.57079632679*k*x + 90200.2013431))/2 - tв)
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qcn2(k, x) := qn2(k, x)/(π*d1)
qc(x, k) := ql(x, k)/(π*d1)
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# Среднее значение линейной плотности теплового потка
qLби := (qn2(kби, 0) + qn2(kби, L))/2 = 20.2434
qLб := (qn2(kб, 0) + qn2(kб, L))/2 = 24.3702
qLмв := (qn2(kмв, 0) + qn2(kмв, L))/2 = 20.9281
# среднее значение температуры на поверхности трубы
Given
qLмв == π*(tc1 - tв)/(1/(α*d3))
qLби == π*(tc3 - tв)/(1/(α*d2))
qLб == π*(tc2 - tв)/(1/(α*d3))
tсмв := 53.435371137  # С
Find(tc1, tc2, tc3) → [53.435371137; 63.0463379756; 84.4952750774]
tсб := 63.0463379756  # С
tсби := 84.4952750774  # С
ε = 0.78  # Степень черноты
# Постоянная
# Стефана-Больцмана
σ := 5.671*10^-8  # Вт/(м^2*К^4)
# Значение сред температур поверхностей в кельвинах
Tв := tв + 273.15 = 268.15  # К
Tсмв := tсмв + 273.15 = 326.585  # К
Tсб := tсб + 273.15 = 336.196  # К
Tсби := tсби + 273.15 = 357.645  # К
Eрезмв := ε*σ*(Tсмв^4 - Tв^4) = 274.501  # Вт/м^2
αэквмв := Eрезмв/(Tсмв - Tв) = 4.69751
Eрезб := ε*σ*(Tсб^4 - Tв^4) = 336.401  # Вт/м^2
αэквб := Eрезб/(Tсб - Tв) = 4.94371
Eрезби := ε*σ*(Tсби^4 - Tв^4) = 495.01  # Вт/м^2
αэквби := Eрезби/(Tсби - Tв) = 5.53113
Mизлмв := 1/(α*d1) + 1/(2*λст)*ln(d2/d1) + 1/(2*λмв)*ln(d3/d2) + 1/((α + αэквмв)*d3)
Mизлб := 1/(α*d1) + 1/(2*λст)*ln(d2/d1) + 1/(2*λб)*ln(d3/d2) + 1/((α + αэквб)*d3)
Mизлби := 1/(α*d1) + 1/(2*λст)*ln(d2/d1) + 1/((α + αэквби)*d2)
P := (d1/2)^2*w*ρ*Cp = 2608.89
tж2изл(Mизл, x) := (2*P*Mизл*tж1 + 2*tв*x - tж1*x)/(x + 2*P*Mизл)
Бетона
qlизлб(x) := π*((tж1 + tж2изл(Mизлб, x))/2 - tв)/(1/(α*d1) + 1/(2*λст)*ln(d2/d1) + 1/(2*λб)*ln(d3/d2) + 1/((α + αэквб)*d3))
Given
π*((tж1 + tж2)/2 - tв)/(1/(α*d1) + 1/(2*λст)*ln(d2/d1) + 1/(2*λб)*ln(d3/d2) + 1/((α + αэквб)*d3))*l == π*(d1/2)^2*w*ρ*Cp*(tж1 - tж2)
Find(l) → 12298.9112004
Lизл := 12298.9112004  # м
qlизлб(Lизл) = 23.3242  # Вт
# Без изоляции
qlизлби(x) := π*((tж1 + tж2изл(Mизлби, x))/2 - tв)/(1/(α*d1) + 1/(2*λст)*ln(d2/d1) + 1/((α + αэквби)*d2))
С
tж2изл(Mизлби, Lизл) = 95.2949
qlизлби(Lизл) = 23.1277  # Вт/м
# Минерального войлока
qlизлмв(x) := π*((tж1 + tж2изл(Mизлмв, x))/2 - tв)/(1/(α*d1) + 1/(2*λст)*ln(d2/d1) + 1/(2*λмв)*ln(d3/d2) + 1/((α + αэквмв)*d3))
qlизлмв(Lизл) = 19.1475  # Вт/м
tж2изл(Mизлмв, Lизл) = 101.267  # С
# Потери теплоты
Qизлб(x) := qlизлб(x)*x
Qизлб(Lизл) = 286862  # Вт
Qизлби(x) := qlизлби(x)*x
Qизлби(Lизл) = 284446  # Вт
Qизлмв(x) := qlизлмв(x)*x
Qизлмв(Lизл) = 235494  # Вт
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# Сводка всех результатов
# Способ №1
L := 18515.6540476  # Метров
t(L, kб) = 95  # С
Q(L, kб) = 245968  # Вт
t(L, kби) = 100.251  # С
Q(L, kби) = 214738  # Вт
t(L, kмв) = 99.3617  # С
Q(L, kмв) = 220179  # Вт
# Способ 2
L := 18377.9300431  # Метров
Qn2(k, x) := qn2(k, x)*x
tn2(kмв, L) = 224.676  # С
Qn2(kмв, L) = 381828  # Вт
tn2(kби, L) = 224.849  # С
Qn2(kби, L) = 369423  # Вт
tn2(kб, L) = 223.804  # С
Qn2(kб, L) = 444093  # Вт
# Способ с учётом излучения
tж2изл(Mизлмв, Lизл) = 101.267  # С
Qизлб(Lизл) = 286862  # Вт
tж2изл(Mизлб, Lизл) = 95  # С
Qизлби(Lизл) = 284446  # Вт
tж2изл(Mизлби, Lизл) = 95.2949  # С
Qизлмв(Lизл) = 235494  # Вт
# Сравнение потерь от расчёиа разными способами и эффективность изоляционных покрытий
d2 = 0.12  # м
dкрмв := d2 + 2*λмв/α = 0.303333  # м
# Критический диаментр изоляции из минерального войлока больше текущего диаметры трубы вместе с минерально-войлоковым покрытием из за чего изоляции малоэффективна (необходимо повысить толщину изоляции для уменьшения потерь)
dкрб := d2 + 2*λб/α = 3.12  # м
# Критический диаметр бетоной изоляции много больше текущего диаметра трубы вместе с бетонным покрытием из-за чего текущая бетонная изоляция не эффективна и наоборот только увеличивает потери (при увелечении толщины бетоного покрытия потери будут снижаться до достижения критического диаметра)
# При отсуствии учёта потерь излучением(Способ 1 и Способ 2) все представленные виды изоляции приводят к повышению потерь, но при учёте потерь излучением, изоляция из минерального войлока снижает потери.
