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# Масло МK
# водяной пар
# Сталь 15
X1 := 0.75
α4 := 11  # Вт/(м^2*К)
G2 := 0.8/3.6 = 0.222222  # кг/с
X2 := 0.25
tв := 20  # С
P := 0.5  # Мпа
tм1 := 10  # С
δ := 0.007  # м
tм2 := 50  # С
α1 := 8000  # Вт/(м^2*К)
Fб := 12  # м^2
α2 := 90  # Вт/(м^2*К)
# Асбестовый шнур
λст(t) := 58.7 - 0.0423*t
α3 := 80  # Вт/(м^2*К)
δиз := 0.05  # М
λас(t) := 0.107 + 0.00019*t
# Температура и теплота парообразования пара при давлении 0.5 Мпа найдём из справочника
# Таблицы теплофизических свойств воды и водяного пара  А. А. Александров  Б. А. Григорьев
tп := 151.84  # С
r := 2107.9  # КДж/кг
# Среднее значение теплоёмкости масла МК из Таблицы 9 (Цветков Ф. Ф.  Григорьев Б. А.)
tмср := (tм1 + tм2)/2 = 30  # С
Cpм := 1.758*10^3 = 1758  # Дж/(кг*К)
# Тепловой поток создаваемый маслом
Qм := G2*Cpм*(tм2 - tм1) = 15626.7  # Вт
# плотность теплового потока через стенки бака
tс1 := 0
tс2 := 0
tс3 := 0
ql := 0
Given  # Расчёт при переменном коэфициенте теплопроводности теплоизоляции
ql == α3*(tмср - tс1)
ql == (tс1 - tс2)/(δ/(58.7 - ((tс1 + tс2)/2)*0.0423))
ql == (tс2 - tс3)/(δиз/(0.107 + ((tс2 + tс3)/2)*0.00019))
ql == α4*(tс3 - tв)
tw1 := 29.773  # С
Find(tс1, tс2, tс3, ql) = [29.7729; 29.7707; 21.6516; 18.168]
tw2 := 29.771  # С
tw3 := 21.652  # С
qw := 18.168  # Вт/м^2
# Тепловые потери через стенки бака
Qб := qw*Fб = 218.016  # Вт
# Тепло получаемое от теплоносителя(водяного пара)
Qвп := Qб + Qм = 15844.7  # Вт
qв == h1 - h2
# Удельная теплота получаемая от водяного пара в трубе
# (изобарный процесс)
# левое граничное значение энтальпии влажного пара
# при давлении 0.5 МПа из справочника
# Таблицы теплофизических свойств воды и водяного пара  А. А. Александров  Б. А. Григорьев
hл := 640.2  # КДж/кг
h1 := hл + X1*r = 2221.12  # КДж/кг
h2 := hл + X2*r = 1167.18  # КДж/кг
qв := (h1 - h2)*10^3 = 1053950  # Дж/кг
# Расход водяного пара - теплоносителя
G1 := Qвп/qв = 0.0150336  # кг/с
# Плотность теплового потока через змеевик
qз := (tп - tмср)/(1/α1 + 1/α2) = 10843.6  # Вт/м^2
# площадь поверхности змеевика
F1 := Qвп/qз = 1.4612  # м^2
# Расчёт при постоянном значении коэфициента теплопроводности теплоизоляции
λас(0) = 0.107  # Вт/(м*к)
tnс1 := 0
tnс2 := 0
tnс3 := 0
qln := 0
Given
qln == α3*(tмср - tnс1)
qln == (tnс1 - tnс2)/(δ/(58.7 - ((tс1 + tс2)/2)*0.0423))
qln == (tnс2 - tnс3)/(δиз/λас(0))
qln == α4*(tnс3 - tв)
Find(tnс1, tnс2, tnс3, qln) = [29.781; 29.7789; 21.5926; 17.5187]
tsw1 := 29.781  # C
tsw2 := 29.779  # C
tsw3 := 21.593  # C
qsw := 17.519  # Вт/м^2
# Тепловые потери серез стенку бака
Qsб := qsw*Fб = 210.228  # Вт
# Тепло получаемое от теплоносителя(водяного пара)
Qsвп := Qsб + Qм = 15836.9  # Вт
qв := (h1 - h2)*10^3 = 1053950  # Дж/кг
# Расход водяного пара - теплоносителя
Gs1 := Qsвп/qв = 0.0150262  # кг/с
# Плотность теплового потока через змеевик
qз := (tп - tмср)/(1/α1 + 1/α2) = 10843.6  # Вт/м^2
Fs1 := Qsвп/qз = 1.46048  # м^2
# Результаты различных способов расчёта
# С переменным коэфициентом теплопроводности
# асбеста
# С постоянным коэфициентом теплопроводности
# асбеста
Qsб = 210.228  # Вт
Qб = 218.016  # Вт
G1 = 0.0150336  # кг/с  # кг/с  # увеличил число отоброжаемых знаков после запятой в расходе, чтобы была видна разница между методами расчета
Gs1 = 0.0150262
F1 = 1.4612  # м^2
Fs1 = 1.46048
м^2
# Вывод: Т.К. из зависимости теплопроводности от температуры видно, что при повышении температуры она возрастёт, в следствии чего тепловые потери возрастут, что потребует увеличения расхода пара на нагрев масла и площади змеевика, по сравнению с результатами при постоянном коэфициентом теплопроводности; впрочем, в данном случае, влияние температуры на коэффециент теплопроводности не оказывает значительного влияния на расход пара и площадь змеевика, что позволяет принебречь ей при расчете, если не требуется точность до трех знаков после запятой по площади змеевика и точности до пяти знаков после запятой для расхода пара.
