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# Исходные данные:
# Параметры заготовки:
r_0 := 0.1  # м  # радиус
L := 230*10^-3  # м  # длина
t_0 := 450  # °C  # начальная темепература
ρ := 7.865*100^3/1000 = 7865  # кг/м^3  # плотность материала
c_p := 460  # Дж/(кг*К)  # удельная теплоёмкость
λ := 19  # Вт/(м*К)  # теплопроводность
# Параметры охладительного бассейна:
t_ж := 15  # °C  # температура жидкости
α := 100  # Вт/(м^2*К)  # коэффициент теплоотдачи
τ_1 := 4.8*60 = 288  # с
# Решение:
# Коэффициенте температуропроводности (теор):
a := λ/(ρ*c_p) = 5.25167e-6  # м^2/с
# Число Био по радиусу и длине заготовки:
Bi_r := α*r_0/λ = 0.526316
Bi_x := α*L/(2*λ) = 0.605263
# Число Фурье по радиусу и длине заготовки:
Fo_r := a*τ_1/r_0^2 = 0.151248
Fo_x := a*τ_1/(L/2)^2 = 0.114365
# Корни характеристического уравнения:
# 1.По радиусу цилиндра (определяем по пересечению):
μ/Bi_r == J0(μ)/J1(μ)  # характеристическое уравнение
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# 2 | 3 | 4
# 1 | 5 | 6
# Первое приближение по графику | Подбор 7-го корня | достаточно близкое совпадние | Итоговые значения
16.5025/Bi_r = 31.3548
10.2251/Bi_r = 19.4277
13.363/Bi_r = 25.3897
3.966/Bi_r = 7.5354
7.0901/Bi_r = 13.4712
0.9621/Bi_r = 1.82799
19.688/Bi_r = 37.4072
J0(16.5025)/J1(16.5025) = 31.3972
J0(10.2251)/J1(10.2251) = 19.3997
J0(13.363)/J1(13.363) = 25.4644
19.6426/Bi_r = 37.3209
J0(3.966)/J1(3.966) = 7.52978
J0(7.0901)/J1(7.0901) = 13.4665
J0(0.9621)/J1(0.9621) = 1.82841
16.5026/Bi_r = 31.3549
J0(19.688)/J1(19.688) = 13.863
10.225/Bi_r = 19.4275
13.3632/Bi_r = 25.3901
J0(19.6426)/J1(19.6426) = 37.4116
3.9655/Bi_r = 7.53445
7.090/Bi_r = 13.471
0.963/Bi_r = 1.8297
μ_r := [0.962; 3.966; 7.090; 10.225; 13.363; 16.503; 19.643]
J0(16.5026)/J1(16.5026) = 31.299
J0(10.225)/J1(10.225) = 19.4373
J0(13.3632)/J1(13.3632) = 25.3356
μ_r := [
    0.525 + (1.05 - 0.525)*0.9;
    (3.675 + 4.2)/2;
    (6.825 + 7.35)/2;
    (9.975 + 10.5)/2;
    (13.125 + 13.65)/2;
    (16.275 + 16.8)/2;
    (19.425 + 19.95)/2
] = [0.9975; 3.9375; 7.0875; 10.2375; 13.3875; 16.5375; 19.6875]
19.65/Bi_r = 37.335
J0(3.9655)/J1(3.9655) = 7.55778
J0(7.090)/J1(7.090) = 13.4845
J0(0.963)/J1(0.963) = 1.82622
19.6427/Bi_r = 37.3211
J0(19.65)/J1(19.65) = 29.304
J0(19.6427)/J1(19.6427) = 37.2723
# 2. По высоте цилиндра (определяем по пересечению):
19.645/Bi_r = 37.3255
μ/Bi_x == cot(μ)  # характеристическое уравнение
J0(19.645)/J1(19.645) = 34.3311
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# Первое приближение по графику
# Подбор 7-го корня | Достаточно близкое совпадение | Итоговые значения
# 2 | 3 | 4 | 5 | 6
1
18.890/Bi_x = 31.2096
18.881/Bi_x = 31.1947
12.6143/Bi_x = 20.841
15.7463/Bi_x = 26.0156
6.3778/Bi_x = 10.5372
9.4884/Bi_x = 15.6765
3.3219/Bi_x = 5.48836
0.708/Bi_x = 1.16974
μ_x := [
    (0.525 + 1.05)/2;
    3.15 + (3.675 - 3.15)*0.3;
    6.3 + (6.825 - 6.3)*0.25;
    9.45 + (9.975 - 9.45)*0.1;
    12.61;
    15.75;
    18.89
] = [0.7875; 3.3075; 6.43125; 9.5025; 12.61; 15.75; 18.89]
cot(18.890) = 24.712
cot(18.881) = 31.792
cot(12.6143) = 20.848
cot(15.7463) = 26.0719
cot(6.3778) = 10.5376
cot(9.4884) = 15.6966
cot(3.3219) = 5.48585
18.88/Bi_x = 31.193
cot(0.708) = 1.16815
12.6144/Bi_x = 20.8412
15.7464/Bi_x = 26.0158
18.8816/Bi_x = 31.1957
μ_x := [0.708; 3.322; 6.378; 9.488; 12.614; 15.746; 18.882]
6.3779/Bi_x = 10.5374
9.4885/Bi_x = 15.6767
3.3218/Bi_x = 5.48819
0.7075/Bi_x = 1.16891
cot(18.88) = 32.837
cot(12.6144) = 20.8046
cot(15.7464) = 26.004
# Распеределние температуры по радиусу цилиндра:
cot(18.8816) = 31.1963
cot(6.3779) = 10.5264
cot(9.4885) = 15.6719
cot(3.3218) = 5.48896
cot(0.7075) = 1.16933
Θ_r(r, τ) := sum(2*J1(μ_r[n])/(μ_r[n]*(J0(μ_r[n])^2 + J1(μ_r[n])^2))*J0(μ_r[n]*r/r_0)*e^(-μ_r[n]^2*a*τ/r_0^2), n = 0 .. 6)
t_r(r, τ) := t_ж + (t_0 - t_ж)*Θ_r(r, τ)
t_r(0, 0) = 475.036  # °C  # температура на оси цилиндра
# Распределение температур по высоте цилиндра:
Θ_x(x, τ) := sum(2*sin(μ_x[n])/(μ_x[n] + sin(μ_x[n])*cos(μ_x[n]))*cos(μ_x[n]*x/(L/2))*e^(-μ_x[n]^2*a*τ/(L/2)^2), n = 0 .. 6)
t_x(x, τ) := t_ж + (t_0 - t_ж)*Θ_x(x, τ)
t_x(0, 0) = 450.704  # °C  # температура в центре по высоте цилиндра
# Функция распределения температур в цилиндре по радиусу и высоте:
Θ(x, r, τ) := Θ_x(x, τ)*Θ_r(r, τ)
t(x, r, τ) := t_ж + (t_0 - t_ж)*Θ(x, r, τ)
# Температурное поле в цилиндре в момент времени τ_1:
# Точки функции t(x, 0, τ_1):
t(0, 0, τ_1) = 429.064  # °C
t(L/8, 0, τ_1) = 426.229  # °C
t(L/4, 0, τ_1) = 415.611  # °C
t(3*L/8, 0, τ_1) = 392.033  # °C
t(L/2, 0, τ_1) = 350.685  # °C
# График t(x, 0, τ_1):
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# Точки функции t(x, r_0, τ_1):
t(0, r_0, τ_1) = 338.637  # °C
t(L/8, r_0, τ_1) = 336.422  # °C
t(L/4, r_0, τ_1) = 328.122  # °C
t(3*L/8, r_0, τ_1) = 309.694  # °C
t(L/2, r_0, τ_1) = 277.376  # °C
# График t(x, r_0, τ_1):
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# Точки функции t(0, r, τ_1):
t(0, 0, τ_1) = 429.064  # °C
t(0, r_0/4, τ_1) = 423.798  # °C
t(0, r_0/2, τ_1) = 407.484  # °C
t(0, 3*r_0/4, τ_1) = 379.141  # °C
t(0, r_0, τ_1) = 338.637  # °C
# График t(0, r, τ_1):
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# Точки функции t(L/2, r, τ_1):
t(L/2, 0, τ_1) = 350.685  # °C
t(L/2, r_0/4, τ_1) = 346.416  # °C
t(L/2, r_0/2, τ_1) = 333.19  # °C
t(L/2, 3*r_0/4, τ_1) = 310.212  # °C
t(L/2, r_0, τ_1) = 277.376  # °C
# График t(L/2, r, τ_1):
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# Температура в центре цилиндра и на расстоянии 0,5r как функция времени:
0.5*r_0 = 0.05  # м
t(0, 0, 0) = 475.781  # °C
t(0, r_0 - 0.5*r_0, 0) = 453.971  # °C
t(0, 0, τ_1) = 429.064  # °C
t(0, r_0 - 0.5*r_0, τ_1) = 407.484  # °C
t(0, r_0 - 0.5*r_0, 300) = 404.753  # °C
t(0, 0, 300) = 426.529  # °C
t(0, r_0 - 0.5*r_0, 3000) = 72.2504  # °C
t(0, 0, 3000) = 75.9843  # °C
t(0, r_0 - 0.5*r_0, 30000) = 15  # °C
t(0, 0, 30000) = 15  # °C
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# График t(0, 0, τ):
# Темп охлаждения цилиндра и температуропроводность материала заготовки для стадии
# регулярного режима (имитируя эксперимент):
# темп охлаждения (экспериментальный)
m == (ln(Θ_τ1) - ln(Θ_τ2))/(τ2 - τ1)
# Для определения регулярного режима (экспериментальным методом) построим графики зависимости ln(Θ) от τ для нескольких точек цилиндра:
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# По графику можно сделать вывод, что регулярный режим уже начался на отметке τ=1067 с,
# поскольку зависимость является линейной.
τ_2 := 1500  # с
τ_3 := 4000  # с
# Число Био для регулярной стадии по радиусу и высоте цилиндра:
Bi_r2 := r_0*α/λ = 0.526316
Bi_x2 := L*α/(2*λ) = 0.605263
# Число Фурье для регулярной стадии по радиусу и высоте цилиндра (Fo ≥ 0.3)
Fo_r2 := a*τ_2/r_0^2 = 0.78775
Fo_r3 := a*τ_3/r_0^2 = 2.10067
Fo_x3 := a*τ_3/(L/2)^2 = 1.58841
Fo_x2 := a*τ_2/(L/2)^2 = 0.595652
# Темп охдаждения:
1/с
m := (ln(Θ(0, 0, τ_2)) - ln(Θ(0, 0, τ_3)))/(τ_3 - τ_2) = 0.000721525
# Темп охлаждения в некоторых точках цилиндра:
1/с
m := (ln(Θ(L/4, r_0/2, τ_2)) - ln(Θ(L/4, r_0/2, τ_3)))/(τ_3 - τ_2) = 0.000721603
1/с
m := (ln(Θ(L/2, r_0, τ_2)) - ln(Θ(L/2, r_0, τ_3)))/(τ_3 - τ_2) = 0.000721689
# Темп охлаждения практически одинаковый во всех точках цилиндра, поэтому можно сделать вывод, что, действительно, наступил регулярный режим.
# При при Fo ≥ 0.3  ряд Фурье сходится достаточно быстро, поэтому достаточно 1 члена ряда.
μ_x[0] = 0.708
μ_r[0] = 0.9975
# Коэффициент формы тела:
K := 1/((μ_r[0]/r_0)^2 + (μ_x[0]/(L/2))^2) = 0.00727784  # м^2
# Температуропроводность:
a_2 := K*m = 5.25234e-6  # м^2/с  # (экспериментальная)
a = 5.25167e-6  # м^2/с  # (теоретическая)
# Вычислим количество теплоты, отданное цилиндром за время τ1
Q := π*r_0^2*L*ρ*c_p*(t_0 - t_ж) = 11371651  # Дж
# Cуммирование
Θ_r.cp.полн := sum(4*Bi_r^2/(μ_r[n]^2*(μ_r[n]^2 + Bi_r^2))*e^(-μ_r[n]^2*Fo_r), n = 0 .. 6) = 0.753576
Θ_x.cp.полн := sum(2*sin(μ_x[n])^2/(μ_x[n]^2 + μ_x[n]*sin(μ_x[n])*cos(μ_x[n]))*e^(-μ_x[n]^2*Fo_x), n = 0 .. 6) = 0.940077
Θ_ср.полн := Θ_r.cp.полн*Θ_x.cp.полн = 0.708419
Qτ1_полн := Q*(1 - Θ_ср.полн) = 3315755  # Дж
830.5  # кДж
# Распределение температур в цилиндре в момент вемени  τ1 (таблицы результатов):
r == r_0/4
r == r_0/2
r == 3*r_0/4
r == r_0
r == 0
# [component: outputs t]
°C
x == 0
x == L/8
x == L/4
x == 3*L/8
x == L/2
# Результаты t(x, 0, τ_1) | Результаты t(x, r_0, τ_1)
# [component: outputs t_x]
# [component: outputs t_x.r0]
# °C | °C
# Результаты t(0, r, τ_1) | Результаты t(L/2, r, τ_1)
# [component: outputs t_r]
# [component: outputs t_l.r]
# °C | °C
1/с
# Темп охлаждения цлинидра в регулярном режиме:
m = 0.000721689
# Температуропроводность исследуемой заготовки:
# теоретическая
a = 5.25167e-6  # м^2/с
# в регулярном режиме
a_2 = 5.25234e-6  # м^2/с
# Количество теплоты, отданное цилиндром за время τ_(1:)
Qτ1_полн = 3315755  # Дж
