# Протокол экспериментальных данных
ORIGIN := 1
# 1. Данные по градуировке диафрагмы
i := 1 .. 11
t[1] := 24  # °C  # - темепература воздуха
t[2] := (3*17.2 + 17.6 + 17.5 + 2*17.1 + 17 + 2*16.9 + 16.8)/11 = 17.1364  # °C  # - температура воды
ΔM := [1005; 993; 988; 962; 961; 978; 972; 989; 956; 965; 952]  # г
Δτ := [59.58; 44.79; 38.67; 33.85; 31.18; 29.09; 26.97; 25.59; 23.34; 22.45; 20.78]  # c
h[1] := [485; 605; 700; 805; 900; 1002; 1100; 1215; 1315; 1418; 1545]  # мм
h[2] := [407; 419; 423; 428; 430; 434; 440; 446; 451; 456; 464]  # мм
ν := [3; 8; 10; 12; 14; 16; 18; 19; 21; 22; 23]  # Гц
# 1) Определим разность уровней воды в трубках дифманометра:
м
Δh := (h[1] - h[2])*10^-3 = [0.078; 0.186; 0.277; 0.377; 0.47; 0.568; 0.66; 0.769; 0.864; 0.962; 1.081]  # м
Δh*1000 = [78; 186; 277; 377; 470; 568; 660; 769; 864; 962; 1081]  # мм
ρ_1 := 1.172  # кг/м^3
# плотность воздуха при t = 24°C
g := 9.81523  # м/с^2
ρ_2 := 997.296  # кг/м^3  # - плотность воды при t = 24°C
# 2) Рассчитаем перепад давлений на диафрагме по формуле: Δp = (ρ-ρ_возд)gΔh
Δp := (ρ_2 - ρ_1)*g*Δh = [762.621; 1818.56; 2708.28; 3686; 4595.28; 5553.44; 6452.94; 7518.66; 8447.49; 9405.65; 10569.1]  # Па
ρ_2 := 998.757  # кг/м^3  # - плотность воды при t = 17.1°C
# 3) Определим массовый и объемный расходы по фомуле:
Gm := ΔM*10^-3/Δτ = [0.0168681; 0.0221701; 0.0255495; 0.0284195; 0.030821; 0.0336198; 0.03604; 0.0386479; 0.0409597; 0.0429844; 0.0458133]  # кг/с
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# 4) Для несжимаемой жидкости массовый расход связан с перепадом давления на диафрагме выражением: Gm = αF_0sqrt(2*ρΔp)
d := 4.4*10^-3  # м - диаметр отверстия в диафрагме
F_0 := π*d^2/4 = 1.52053e-5  # м^2  # - поперечное сечение диафрагмы
# Коэффициент расхода:
α := Gm/(F_0*sqrt(2*ρ_2*Δp)) = [0.898817; 0.765006; 0.72243; 0.688809; 0.669039; 0.663856; 0.660186; 0.655867; 0.655772; 0.652193; 0.65574]
# 5) Если среднюю скорость потока выразить через массовый расход, то выражение для числа Рейнольдса запишется в виде: Re =4*Gm/(π*D*μ)
D := 7.9*10^-3  # м  - диаметр трубопровода
μ := 1000*10^-6  # Па*с  - динамический коэффициент вязкости воды
Па*с
Re := 4*Gm/(π*D*μ) = [2718.62; 3573.15; 4117.81; 4580.36; 4967.41; 5418.49; 5808.56; 6228.87; 6601.46; 6927.78; 7383.71]
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# 6) Зависимость коэффициента расхода от числа Рейнольдса:
# 7) Оценим погрешность измерения для коэффицента расхода
α == Gm/(F_0*sqrt(2*ρ[2]*Δp))
# а) Рассчитаем ΔGm
ΔGm == ΔM/Δτ
# tpn - коэффициент Стьюдента (для доверительной вероятности P = 0.95 и 11-ти измерений)
t_p.n := 2.228
# ΔMav – среднее значение массы воды
ΔMav := sum(ΔM)*10^-3/11 = 0.974636  # кг
Δ(ΔM) := t_p.n*sqrt(sum((ΔM[i]*10^-3 - ΔMav)^2, i = 1 .. 11)/(11*(11 - 1)))
Δ(ΔM) = 0.0115586  # кг
Δ(Δτ) := 0.005  # с  # (для электронного секундомера)
Δτ_av := sum(Δτ)/11 = 32.39  # с
δGm := sqrt((Δ(ΔM)/ΔMav)^2 + (Δ(Δτ)/Δτ_av)^2) = 0.00513244
# б) Рассчитаем Δ(Δp)
Δp := (ρ_2 - ρ_1)*g*Δh
ΔGm := δGm*Gm = [8.65744e-5; 0.000113787; 0.000131131; 0.000145861; 0.000158187; 0.000172552; 0.000184973; 0.000198358; 0.000210223; 0.000220615; 0.000235134]
кг/с
Δρ[1] := 0.0005  # кг/м^3
Δρ[2] := 0.0005  # кг/м^3
Δg := 0.000005  # м/с^2
Δ(Δh) := 0.0005  # м
Δh_av := sum(Δh) = 6.292
δp := sqrt((Δρ[1]/ρ_1)^2 + (Δρ[2]/ρ_2)^2 + (Δg/g)^2 + (Δ(Δh)/Δh_av)^2) = 0.00043396
Δ(Δp) := δp*Δp
Δ(Δp) = [0.331432; 0.790338; 1.17701; 1.60192; 1.99709; 2.4135; 2.80442; 3.26758; 3.67125; 4.08766; 4.59331]  # Па
# в) Рассчитаем | ΔF_0
F_0 == π*d^2/4
Δd := 0.05*10^-3  # м
δF_0 := sqrt(2^2*(Δd/d)) = 0.213201
ΔF_0 := δF_0*F_0 = 3.24178e-6  # м^2
# При полученных даных относительная погрешность коэффициент расхода:
δα := sqrt((ΔGm/Gm)^2 + (ΔF_0/F_0)^2 + (1/2)^2*(Δρ[2]/ρ_2)^2 + (1/2)^2*(Δ(Δp)/Δp)^2)
δα = [0.213263; 0.213263; 0.213263; 0.213263; 0.213263; 0.213263; 0.213263; 0.213263; 0.213263; 0.213263; 0.213263]
Δα[i] := δα[i]*α[i]
Δα = [0.191684; 0.163147; 0.154067; 0.146897; 0.142681; 0.141576; 0.140793; 0.139872; 0.139852; 0.139088; 0.139845]
# 2. Градуировочная зависимость тахометрического расходомера
# Определим объемный расход:
Gv := Gm*36*10^5/ρ_2 = [60.8007; 79.9118; 92.0927; 102.438; 111.094; 121.182; 129.906; 139.306; 147.639; 154.936; 165.133]  # л/ч
A := slope(ν, Gv) = 5.1454
B := intercept(ν, Gv) = 40.9366
y(x) := A*x + B
x := 0 .. 30
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# 3.  Данные по градуировке ротаметра РМ-4-0, 16
i := 1 .. 6
ΔM[1] := [969; 979; 993; 993; 981; 991]  # г
Δτ[1] := [208.37; 79.64; 48.20; 33.35; 25.33; 19.92]  # с
# 1) Найдем массовый расход воды для каждой отметки шкалы
Gm[1] := ΔM[1]*10^-3/Δτ[1] = [0.00465038; 0.0122928; 0.0206017; 0.0297751; 0.0387288; 0.049749]  # кг/с
# 2) Найдем объемный расход воды для каждой отметки шкалы
V1 := Gm[1]*36*10^5/ρ_2 = [16.7622; 44.3092; 74.2583; 107.324; 139.597; 179.319]  # л/ч
# 3) Запишем заводской объёмный расход
V16 := [20; 46; 76; 107; 140; 171]  # л/ч
# 4)Оценим погрешность в сравнении с заводской градуировкой
Vnom := 160  # л/ч  # %
i := 1 .. 6
δV[i] := |V1[i] - V16[i]|/Vnom
δV = [0.0202362; 0.0105674; 0.0108858; 0.0020238; 0.00251795; 0.0519955]
δV*100 = [2.02362; 1.05674; 1.08858; 0.20238; 0.251795; 5.19955]
# Зависимости расхода от значений отметок условной шкалы РМ-4-0,16
graduir1 := [0; 20; 40; 60; 80; 100]
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# 4. Данные по градуировке ротаметра РМ-4-0, 25
ΔM[2] := [959; 993; 1006; 996; 955; 929]  # г
Δτ[2] := [91.79; 44.05; 29.29; 20.59; 15.76; 12.77]  # с
# 1) Найдем массовый расход воды для каждой отметки шкалы
Gm[2] := ΔM[2]*10^-3/Δτ[2] = [0.0104478; 0.0225426; 0.0343462; 0.048373; 0.0605964; 0.0727486]  # кг/с
# 2) Найдем объемный расход воды для каждой отметки шкалы
V2 := Gm[2]*36*10^5/ρ_2 = [37.6588; 81.2542; 123.8; 174.36; 218.419; 262.221]  # л/ч
# 3) Запишем заводской объёмный расход
V25 := [41; 80; 121; 161; 209; 259]  # л/ч
# 4)Оценим погрешность в сравнении с заводской градуировкой
Vnom := 250  # л/ч  # %
i := 1 .. 6
δV[i] := |V2[i] - V25[i]|/Vnom
δV = [0.013365; 0.00501694; 0.0112007; 0.0534381; 0.0376748; 0.012884]
δV*100 = [1.3365; 0.501694; 1.12007; 5.34381; 3.76748; 1.2884]
graduir2 := [0; 20; 40; 60; 80; 100]  # (отметка шкалы)
# Зависимости расхода от значений отметок условной шкалы РМ-4-0,25
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# Допускаемая основная погрешность ротаметров составляет ±2,5% от номинальных пределов измерений. Дополнительная погрешность не превышает половины основной
# допускаемой погрешности на каждые 10 ºС изменения температуры воды.
#
# Дополнительная погрешность на каждые 10 градусов от 18 ºС составляет 1.25% следовательно при 17 градусах она составит (1.25/10)*1=0.125
#
# Допускаемая погрешность составляет 2.5%+0.125% =2.625%
#
# Видим,что все значения погрешности не превышают допустимую, следовательно,
# прибор соответствует своему классу точности.
# Аппроксимируем таблицу градуировки прямой:
A := slope(graduir1, V1) = 1.61674
B := intercept(graduir1, V1) = 12.7582
C(x) := A*x + B
i := 1 .. 6
x := 0 .. 105
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# Оценим погрешность при аппроксимации графика линейной зависимостью. Для
# этого найдем среднее квадратическое отклонение:
σ := sqrt(sum((V1[i] - C(graduir1[i]))^2, i = 1 .. 6)/6) = 3.23458
