# Лабораторная работа № 2
# Количество экспериментальных серий при различных
# температурных режимах термостата
# (серии объединены в массиы первичных данных Ut,Uk, E, Tцифр, Тртут)
N := 4
i := 1 .. 20
# Платиновый термометр
# сопротивления:
# напряжения
# на термометре Ut и катушке Uk,
# мВ
# Термо-ЭДС
# термопары
# Е, мВ
# Ртутный
# термометр
# Tртут, ^оС
# Цифровой
# термометр
# Тцифр, ^оС
Ut := [10.9087; 10.9089; 10.9086; 10.9077; 10.9073; 11.0753; 11.0752; 11.0764; 11.0764; 11.0773; 11.2068; 11.2067; 11.2070; 11.2072; 11.2075; 11.3056; 11.3057; 11.3060; 11.3058; 11.3062]
Uk := [9.5381; 9.5384; 9.5390; 9.5391; 9.5383; 9.5608; 9.5609; 9.5607; 9.5610; 9.5613; 9.5717; 9.5718; 9.5719; 9.5724; 9.5723; 9.5876; 9.5878; 9.5870; 9.5880; 9.5882]
E := [1.3382; 1.3380; 1.3378; 1.3381; 1.3380; 1.4951; 1.4959; 1.4953; 1.4956; 1.4954; 1.6200; 1.6201; 1.6199; 1.6198; 1.6197; 1.7010; 1.7012; 1.7013; 1.7011; 1.7009]
Tртут := [33.7; 33.7; 33.7; 33.7; 33.7; 37.6; 37.6; 37.6; 37.6; 37.6; 40.6; 40.6; 40.6; 40.6; 40.6; 42.6; 42.6; 42.6; 42.6; 42.6]
Tцифр := [33.9; 33.9; 33.9; 33.9; 33.9; 37.6; 37.6; 37.6; 37.6; 37.6; 40.7; 40.7; 40.7; 40.7; 40.7; 42.9; 42.9; 42.9; 42.9; 42.9]
# Обработка результатов измерений
# Средство измерения температуры: терморезистор - платиновый термометр сопротивления
# 1) Нахождение сопротивления термометра Rt, Ом
# Задание встроенной переменной, определяющей
# номер первого элемента массива
ORIGIN ≡ 1
# Сопротивление образцовой катушки, Ом
Rk := 10.000
Rt[i] := Ut[i]*Rk/Uk[i]
Rt = [11.437; 11.4368; 11.4358; 11.4347; 11.4353; 11.5841; 11.5838; 11.5853; 11.585; 11.5856; 11.7083; 11.708; 11.7082; 11.7078; 11.7083; 11.7919; 11.7918; 11.7931; 11.7916; 11.7918]
# 2) Вычисление платиновой температуры t_i
# (вспомогательный параметр градуировочной зависимости
# терморезистора)
# Задача: решить квадратное уравнение относительно t_i
# константы
α := 3.9141*10^-3
δ := 1.49187
Ro := 10.0923
# параметр
W[i] := Rt[i]/Ro
# Решение квадратного уравнения осуществляем с помощью
# стандартной встроенной функции  Mathcad root(F(x),x):
# Задаем начальное приближение по температуре, ^oC
tt := 50
t[i] := root(1/α*(W[i] - 1) + δ*tt/100*(tt/100 - 1) - tt, tt)
# 3) Вычисление температуры T_i терморезистора по расчетному
# уравнению T(R)
T[i] := t[i] + 0.015*(t[i]/100*(t[i]/100 - 1))*((t[i]/419.58 - 1)*(t[i]/630.74 - 1))
# 4) Оценка погрешности измерений температуры ПТС.
# Средние значения, Tsr, и случайные погрешности
j := 1 .. 5  # m -число элементов
m := 5
t = [33.7071; 33.7033; 33.6772; 33.6504; 33.664; 37.4149; 37.4092; 37.447; 37.4378; 37.4524; 40.5485; 40.5428; 40.5476; 40.5374; 40.5484; 42.6604; 42.6568; 42.6896; 42.6532; 42.6576]
Tsr := sum(T[j], j)/m
Ts[1] := Tsr
# СКО индивидуального измерения
# СКО среднего результата
ΔT := sqrt(sum((T[j] - Tsr)^2, j)/(m - 1))
ΔTsr := ΔT/sqrt(m)
T = [33.7041; 33.7004; 33.6743; 33.6475; 33.6611; 37.4119; 37.4062; 37.4439; 37.4348; 37.4493; 40.5455; 40.5397; 40.5446; 40.5344; 40.5454; 42.6573; 42.6537; 42.6865; 42.6502; 42.6545]
Tsr = 33.6775
ΔT = 0.0245406
ΔTsr = 0.0109749  # ^oC
j := 6 .. 10
m := 5
ΔTsr := ΔT/sqrt(m)
Tsr := sum(T[j], j)/m
ΔT := sqrt(sum((T[j] - Tsr)^2, j)/(m - 1))
Tsr = 37.4292
ΔT = 0.0192659
ΔTsr = 0.0109749  # ^oC
Ts[2] := Tsr
j := 11 .. 15
m := 5
Tsr := sum(T[j], j)/m
ΔTsr := ΔT/sqrt(m)
ΔT := sqrt(sum((T[j] - Tsr)^2, j)/(m - 1))
Tsr = 40.5419
ΔT = 0.00482083
ΔTsr = 0.00861597  # ^oC
Ts[3] := Tsr
j := 16 .. 20
m := 5
Tsr := sum(T[j], j)/m
ΔT := sqrt(sum((T[j] - Tsr)^2, j)/(m - 1))
ΔTsr := ΔT/sqrt(m)
Tsr = 42.6604
ΔT = 0.0147886
ΔTsr = 0.00661368  # ^oC
Ts[4] := Tsr
# Средние значения температуры ПТС
i := 1 .. 4
Ts = [33.6775; 37.4292; 40.5419; 42.6604]  # ^oC
# Анализ значений ΔTsr показывает, что все экспериментальные серии являются подобными. Случайная погрешность серии ΔTsr~0.05 ^oC.
ΔTsr := 0.05
ΔT := ΔTsr
# Оценка систематической погрешности измерения температуры ПТС
# (на примере измерений в первом температурном режиме
# без учета корреляции Ut и Uk)
# Относительная погрешность:
# δTsis:=δtsis
# δtsis~δW/(1-1/W)
# δW:=δRt
δRt := sqrt(δUt^2 + δRk^2 + δUk^2)
# Относительные приборные погрешности измерения δUt, δUk и δRk
# δU=±(0.02+0.02*(Umax/U-1)), %
Ut := 10.8640  # мВ
Uk := 9.1923  # мВ
Umax := 10.000  # мВ
δUt := (0.02 + 0.02*(Umax/Ut - 1))
δUt = 0.0184094  # %
δUk := (0.02 + 0.02*(Umax/Uk - 1))
δUk = 0.0217573  # %
δRk := 5*10^-4*100/10.000
δRk = 0.005  # %
δRt := sqrt(δUt^2 + δRk^2 + δUk^2)
δRt = 0.0289359  # %
# Приблизительная оценка косвенной погрешности Т (Rt), резистор
tc := (1/α*(Wt - 1))  # error: This variable is undefined.
tc := (1/α*(Wt - 1) + δ*tc/100*(tc/100 - 1))  # error: This variable is undefined.
δTsis := δRt/(1 - Ro/Rt[1])
δTsis = 0.246111  # %
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# В этом случае случайная погрешность косвенного результата записывается в виде
δRt := sqrt((δUt - δUk)^2 + δRk^2)
δRt = 0.00601735  # %
# Относительная систематическая
# погрешность Т (Rt), резистор, режим 1
T[1] = 33.7041
Rt[1] = 11.437
Ro = 10.0923
δTsis := δRt/(1 - Ro/Rt[1])
δTsis = 0.0511799  # %
# Абсолютная систематическая
# погрешность
ΔTsis := δTsis/100*T[1]
ΔTsis = 0.0172498  # ^oC
# Полная систематическая погрешность с учетом погрешности
# градуировочной зависимости ΔTapr
ΔTapr := 0.005  # ^oC
ΔT_SIS := sqrt(ΔTsis^2 + ΔTapr^2)
ΔT_SIS = 0.0179598  # ^oC
# Допустимая погрешность ΔTптс определения температуры ПТС
ΔTптс := sqrt(ΔTsr^2 + ΔT_SIS^2)
ΔTптс = 0.0531277  # ^oC
ΔTsr = 0.05  # ^oC
# Доверительный интервал для допустимой погрешности ΔTптс при коэффициенте доверия α=0.95 при 5 измерениях (коэффициент Стьюдента принят  γ := 2.57)
Δ(ΔTsr) := γ*ΔTsr
Δ(ΔTsr) = 0.1285  # ^oC
# Датчик: хромель-алюмелевая(ХА) термопара
j := 2 .. 21
# Выполнение градуировки и поиск градуировочной зависимости T(E)
# Добавляем в исходный массив точку (0 ,0.)
# Температура ПТС
# Термо-ЭДС
Ttp[1] := 0.0
Etp[1] := 0.0
Ttp[j] := T[j - 1]
Etp[j] := E[j - 1]
Etp = [0; 1.3382; 1.338; 1.3378; 1.3381; 1.338; 1.4951; 1.4959; 1.4953; 1.4956; 1.4954; 1.62; 1.6201; 1.6199; 1.6198; 1.6197; 1.701; 1.7012; 1.7013; 1.7011; 1.7009]
Ttp = [0; 33.7041; 33.7004; 33.6743; 33.6475; 33.6611; 37.4119; 37.4062; 37.4439; 37.4348; 37.4493; 40.5455; 40.5397; 40.5446; 40.5344; 40.5454; 42.6573; 42.6537; 42.6865; 42.6502; 42.6545]
# Построение градуировочной зависимости T(E)
# методом наименьших квадратов
# степень полинома n=2 :  форма: Т=a1*E+a2*E^2
# число эксп. точек
n := 21
# Задача: найти (а_i) путем минимизации функционала S
S(a) := sum((a[1]*Etp[j] + a[2]*Etp[j]^2 - Ttp[j])^2, j)
# Построим матрицу частных производных функционала S по параметрам (а_i)
d/d(a[1])(S/2) := a[1]*sum(Etp[j]^2, j) + a[2]*sum(Etp[j]^3, j) - sum(Ttp[j]*Etp[j], j)
d/d(a[2])(S/2) := a[1]*sum(Etp[j]^3, j) + a[2]*sum(Etp[j]^4, j) - sum(Ttp[j]*E1tp[j]^2, j)
# Система нормальных уравнений
# A - конструкционная матрица, В - столбец (правая часть системы)
# а - искомые коэффициенты
А*а := B  # error: A name is required here.
A[1, 1] := sum(Etp[j]^2, j)
A[1, 2] := sum(Etp[j]^3, j)
B[1] := sum(Ttp[j]*Etp[j], j)
A[2, 1] := A[1, 2]
A[2, 2] := sum(Etp[j]^4, j)
B[2] := sum(Ttp[j]*Etp[j]^2, j)
# Решение системы уравнений:
a := A^-1*B
# Искомые коэффициенты
a = [25.421; -0.224831]
# Оценка среднеквадратически отклонения СКО
# СКО  индивидуального измерения (не смещенное)
CKO := sqrt(sum((a[1]*Etp[j] + a[2]*Etp[j]^2 - Ttp[j])^2, j)/(n - 1))
CKO = 0.069431  # ^oC
# СКО  среднего результата (без учета объема выборки)
CKOсред := sqrt(sum((a[1]*Etp[j] + a[2]*Etp[j]^2 - Ttp[j])^2, j)/(n*(n - 1)))
CKOсред = 0.0151511  # ^oC
# Расчет СКО, ΔTav, для среднего результата (учет объема выборки) с включением коэффициента Стьюдента t_(p st) при доверительной вероятности P=0.68 и n=21
tpst := 2.09
ΔTav := tpst*CKOсред
ΔTav = 0.0316658  # ^oC
# Построение градуировочной зависимости Т_тп(Е_тп)
Tтп(Eтп) := a[1]*Eтп + a[2]*Eтп^2
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# Рис. 1. График градуировочной зависимости Т_тп(Е_тп)
a = [25.421; -0.224831]
# Т_тп - расчетная
# температура, ^оС;
# T_tp - измереннная температура, ^оС;
# Е - измеренная термо-ЭДС, мВ.
# Рис. 2.  График отклонений экспериментальных точек T_(tp j) от аппроксимирующей зависимости Т_тп(Е_тп), ^oC
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# Т_тп - расчетная
# температура, ^оС;
# T_tp - измереннная температура, ^оС;
# Е - термо-ЭДС, мВ.
# Построение функции преобразования  E (T)
# Е_станд - значения Термо-ЭДС для стандартной хромель-алюмелевой термопары
i := 0 .. 4
# E_средн | T_станд | Е_станд
x := [0; 0.878; 1.8278; 2.51427; 2.92963]  # мВ
Тст := [0; 21.00; 45.0; 62.0; 72.0]  # ^оС
Es := [0; 0.838; 1.817; 2.519; 2.934]  # мВ
# Температура индивидуальной хромель-алюмелевой термопары
Tтп(Es) = [0; 21.1449; 45.4478; 62.609; 72.6499]  # ^оС
# Поправка  С, ^оС,  есть  абсолютное отклонение Т[ст] (температура стандартной термопары)  от  T(E)[ст]  (температура индивидуальной термопары)
i := 1 .. 5
C := Tтп(Es) - Тст  # ^оС
C = [0; 0.144945; 0.447753; 0.608967; 0.649908]
# Относительное значение поправки  dС(Т)
dC := vectorize(C*100/(Tтп(Es) + 0.00001))  # %
dC = [0; 0.685484; 0.985204; 0.972652; 0.894575]  # %
# Рис. 3. Графики  функции преобразования  E (T); стандартной зависимости Еs(T); поправки С, ^оС; относительного отклонения dС,%
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# Оценка погрешности термодатчиков (цифровой и ртурный термометры)
Ts = [33.6775; 37.4292; 40.5419; 42.6604]  # ^oC
Tцифр := [35.4; 40.3; 45.5; 50.3]
Tртут := [35.3; 40.3; 45.2; 50.2]  # ^оС
# СКО  индивидуального измерения (смещенное) ΔTцифр
ΔTцифр := sqrt(sum((Tцифр[i] - Ts[i])^2/4, i = 1 .. 4))
ΔTцифр = 4.85165  # ^оС
# СКО  индивидуального измерения (смещенное) ΔTртут
ΔTртут := sqrt(sum((Tртут[i] - Ts[i])^2/4, i = 1 .. 4))
ΔTртут = 4.72802  # ^оС
