# Лабораторная работа № 2
# Количество экспериментальных серий при различных
# температурных режимах термостата
# (серии объединены в массиы первичных данных Ut,Uk, E, Tцифр, Тртут)
N := 4
i := 1 .. 16
# Платиновый термометр
# сопротивления:
# напряжения
# на термометре Ut и катушке Uk,
# мВ
# Термо-ЭДС
# термопары
# Е, мВ
# Ртутный
# термометр
# Tртут, ^оС
# Цифровой
# термометр
# Тцифр, ^оС
Ut := [10.7344; 10.7437; 10.7466; 10.743; 10.8478; 10.851; 10.857; 10.8513; 11.0194; 11.0195; 11.019; 11.0174; 11.2039; 11.2053; 11.2054; 11.2054]
Uk := [9.5765; 9.5877; 9.5902; 9.5891; 9.5874; 9.5907; 9.5875; 9.591; 9.6066; 9.6056; 9.605; 9.6022; 9.5982; 9.5999; 9.5997; 9.6004]
E := [1.102; 1.1025; 1.102; 1.103; 1.2165; 1.2165; 1.2166; 1.2165; 1.3775; 1.3787; 1.3785; 1.3791; 1.5852; 1.5858; 1.5857; 1.5855]
Tртут := [27.5; 27.6; 27.7; 27.8; 30.6; 30.9; 30.9; 30.9; 34.6; 34.6; 34.6; 34.6; 39.7; 39.7; 39.7; 39.7]
Tцифр := [27.9; 28; 28; 28; 30.9; 30.9; 30.9; 30.9; 34.7; 34.7; 34.7; 34.7; 39.7; 39.7; 39.7; 39.7]
# Обработка результатов измерений
# Средство измерения температуры: терморезистор - платиновый термометр сопротивления
# 1) Нахождение сопротивления термометра Rt, Ом
# Задание встроенной переменной, определяющей
# номер первого элемента массива
ORIGIN ≡ 1
# Сопротивление образцовой катушки, Ом
Rk := 10.000
Rt[i] := Ut[i]*Rk/Uk[i]
Rt = [11.2091; 11.2057; 11.2058; 11.2033; 11.3146; 11.3141; 11.3241; 11.314; 11.4707; 11.472; 11.4721; 11.4738; 11.6729; 11.6723; 11.6727; 11.6718]
# 2) Вычисление платиновой температуры t_i
# (вспомогательный параметр градуировочной зависимости
# терморезистора)
# Задача: решить квадратное уравнение относительно t_i
# константы
α := 3.9141*10^-3
δ := 1.49187
Ro := 10.0923
# параметр
W[i] := Rt[i]/Ro
# Решение квадратного уравнения осуществляем с помощью
# стандартной встроенной функции  Mathcad root(F(x),x):
# Задаем начальное приближение по температуре, ^oC
tt := 50
t[i] := root(1/α*(W[i] - 1) + δ*tt/100*(tt/100 - 1) - tt, tt)
# 3) Вычисление температуры T_i терморезистора по расчетному
# уравнению T(R)
T[i] := t[i] + 0.015*(t[i]/100*(t[i]/100 - 1))*((t[i]/419.58 - 1)*(t[i]/630.74 - 1))
# 4) Оценка погрешности измерений температуры ПТС.
# Средние значения, Tsr, и случайные погрешности
j := 1 .. 5  # m -число элементов
m := 4
t = [27.9714; 27.886; 27.8886; 27.8265; 30.6266; 30.6126; 30.8652; 30.6116; 34.5557; 34.5884; 34.5933; 34.6357; 39.6563; 39.641; 39.6497; 39.6283]
Tsr := sum(T[j], j)/m
Ts[1] := Tsr
# СКО индивидуального измерения
# СКО среднего результата
ΔT := sqrt(sum((T[j] - Tsr)^2, j)/(m - 1))
ΔTsr := ΔT/sqrt(m)
T = [27.9687; 27.8833; 27.8859; 27.8238; 30.6238; 30.6098; 30.8624; 30.6088; 34.5527; 34.5855; 34.5904; 34.6327; 39.6533; 39.6379; 39.6467; 39.6252]
Tsr = 35.5464
ΔT = 9.28613
ΔTsr = 4.64307  # ^oC
j := 6 .. 10
m := 4
ΔTsr := ΔT/sqrt(m)
Tsr := sum(T[j], j)/m
ΔT := sqrt(sum((T[j] - Tsr)^2, j)/(m - 1))
Tsr = 40.3048
ΔT = 10.6921
ΔTsr = 4.64307  # ^oC
Ts[2] := Tsr
j := 11 .. 15
m := 4
Tsr := sum(T[j], j)/m
ΔTsr := ΔT/sqrt(m)
ΔT := sqrt(sum((T[j] - Tsr)^2, j)/(m - 1))
Tsr = 47.0403
ΔT = 12.5562
ΔTsr = 5.34604  # ^oC
Ts[3] := Tsr
# Анализ значений ΔTsr показывает, что все экспериментальные серии являются подобными. Случайная погрешность серии ΔTsr~5^oC.
ΔTsr := 5
ΔT := ΔTsr
# Оценка систематической погрешности измерения температуры ПТС
# (на примере измерений в первом температурном режиме
# без учета корреляции Ut и Uk)
# Относительная погрешность:
# δTsis:=δtsis
# δtsis~δW/(1-1/W)
# δW:=δRt
δRt := sqrt(δUt^2 + δRk^2 + δUk^2)
# Относительные приборные погрешности измерения δUt, δUk и δRk
# δU=±(0.02+0.02*(Umax/U-1)), %
Ut := 10.8640  # мВ
Uk := 9.1923  # мВ
Umax := 10.000  # мВ
δUt := (0.02 + 0.02*(Umax/Ut - 1))
δUt = 0.0184094  # %
δUk := (0.02 + 0.02*(Umax/Uk - 1))
δUk = 0.0217573  # %
δRk := 5*10^-4*100/10.000
δRk = 0.005  # %
δRt := sqrt(δUt^2 + δRk^2 + δUk^2)
δRt = 0.0289359  # %
# Приблизительная оценка косвенной погрешности Т (Rt), резистор
tc := (1/α*(Wt - 1))  # error: This variable is undefined.
tc := (1/α*(Wt - 1) + δ*tc/100*(tc/100 - 1))  # error: This variable is undefined.
δTsis := δRt/(1 - Ro/Rt[1])
δTsis = 0.290423  # %
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# В этом случае случайная погрешность косвенного результата записывается в виде
δRt := sqrt((δUt - δUk)^2 + δRk^2)
δRt = 0.00601735  # %
# Относительная систематическая
# погрешность Т (Rt), резистор, режим 1
T[1] = 27.9687
Rt[1] = 11.2091
Ro = 10.0923
δTsis := δRt/(1 - Ro/Rt[1])
δTsis = 0.0603947  # %
# Абсолютная систематическая
# погрешность
ΔTsis := δTsis/100*T[1]
ΔTsis = 0.0168916  # ^oC
# Полная систематическая погрешность с учетом погрешности
# градуировочной зависимости ΔTapr
ΔTapr := 0.005  # ^oC
ΔT_SIS := sqrt(ΔTsis^2 + ΔTapr^2)
ΔT_SIS = 0.0176161  # ^oC
# Допустимая погрешность ΔTптс определения температуры ПТС
ΔTптс := sqrt(ΔTsr^2 + ΔT_SIS^2)
ΔTптс = 5.00003  # ^oC
ΔTsr = 5  # ^oC
# Доверительный интервал для допустимой погрешности ΔTптс при коэффициенте доверия α=0.95 при 5 измерениях (коэффициент Стьюдента принят  γ := 2.57)
Δ(ΔTsr) := γ*ΔTsr
Δ(ΔTsr) = 12.85  # ^oC
# Датчик: хромель-алюмелевая(ХА) термопара
j := 2 .. 17
# Выполнение градуировки и поиск градуировочной зависимости T(E)
# Добавляем в исходный массив точку (0 ,0.)
# Температура ПТС
# Термо-ЭДС
Ttp[1] := 0.0
Etp[1] := 0.0
Ttp[j] := T[j - 1]
Etp[j] := E[j - 1]
Etp = [0; 1.102; 1.1025; 1.102; 1.103; 1.2165; 1.2165; 1.2166; 1.2165; 1.3775; 1.3787; 1.3785; 1.3791; 1.5852; 1.5858; 1.5857; 1.5855]
Ttp = [0; 27.9687; 27.8833; 27.8859; 27.8238; 30.6238; 30.6098; 30.8624; 30.6088; 34.5527; 34.5855; 34.5904; 34.6327; 39.6533; 39.6379; 39.6467; 39.6252]
# Построение градуировочной зависимости T(E)
# методом наименьших квадратов
# степень полинома n=2 :  форма: Т=a1*E+a2*E^2
# число эксп. точек
n := 17
# Задача: найти (а_i) путем минимизации функционала S
S(a) := sum((a[1]*Etp[j] + a[2]*Etp[j]^2 - Ttp[j])^2, j)
# Построим матрицу частных производных функционала S по параметрам (а_i)
d/d(a[1])(S/2) := a[1]*sum(Etp[j]^2, j) + a[2]*sum(Etp[j]^3, j) - sum(Ttp[j]*Etp[j], j)
d/d(a[2])(S/2) := a[1]*sum(Etp[j]^3, j) + a[2]*sum(Etp[j]^4, j) - sum(Ttp[j]*E1tp[j]^2, j)
# Система нормальных уравнений
# A - конструкционная матрица, В - столбец (правая часть системы)
# а - искомые коэффициенты
А*а := B  # error: A name is required here.
A[1, 1] := sum(Etp[j]^2, j)
A[1, 2] := sum(Etp[j]^3, j)
B[1] := sum(Ttp[j]*Etp[j], j)
A[2, 1] := A[1, 2]
A[2, 2] := sum(Etp[j]^4, j)
B[2] := sum(Ttp[j]*Etp[j]^2, j)
# Решение системы уравнений:
a := A^-1*B
# Искомые коэффициенты
a = [25.9556; -0.608251]
# Оценка среднеквадратически отклонения СКО
# СКО  индивидуального измерения (не смещенное)
CKO := sqrt(sum((a[1]*Etp[j] + a[2]*Etp[j]^2 - Ttp[j])^2, j)/(n - 1))
CKO = 0.0652272  # ^oC
# СКО  среднего результата (без учета объема выборки)
CKOсред := sqrt(sum((a[1]*Etp[j] + a[2]*Etp[j]^2 - Ttp[j])^2, j)/(n*(n - 1)))
CKOсред = 0.0158199  # ^oC
# Расчет СКО, ΔTav, для среднего результата (учет объема выборки) с включением коэффициента Стьюдента t_(p st) при доверительной вероятности P=0.68 и n=17
tpst := 2.09
ΔTav := tpst*CKOсред
ΔTav = 0.0330636  # ^oC
# Построение градуировочной зависимости Т_тп(Е_тп)
Tтп(Eтп) := a[1]*Eтп + a[2]*Eтп^2
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# Рис. 1. График градуировочной зависимости Т_тп(Е_тп)
a = [25.9556; -0.608251]
# Т_тп - расчетная
# температура, ^оС;
# T_tp - измереннная температура, ^оС;
# Е - измеренная термо-ЭДС, мВ.
# Рис. 2.  График отклонений экспериментальных точек T_(tp j) от аппроксимирующей зависимости Т_тп(Е_тп), ^oC
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# Т_тп - расчетная
# температура, ^оС;
# T_tp - измереннная температура, ^оС;
# Е - термо-ЭДС, мВ.
# Построение функции преобразования  E (T)
# Е_станд - значения Термо-ЭДС для стандартной хромель-алюмелевой термопары
i := 0 .. 4
# E_средн | T_станд | Е_станд
x := [0; 0.878; 1.8278; 2.51427; 2.92963]  # мВ
Тст := [0; 21.00; 45.0; 62.0; 72.0]  # ^оС
Es := [0; 0.838; 1.817; 2.519; 2.934]  # мВ
# Температура индивидуальной хромель-алюмелевой термопары
Tтп(Es) = [0; 21.3237; 45.1532; 61.5226; 70.9177]  # ^оС
# Поправка  С, ^оС,  есть  абсолютное отклонение Т[ст] (температура стандартной термопары)  от  T(E)[ст]  (температура индивидуальной термопары)
i := 1 .. 5
C := Tтп(Es) - Тст  # ^оС
C = [0; 0.323658; 0.153203; -0.4774; -1.08229]
# Относительное значение поправки  dС(Т)
dC := vectorize(C*100/(Tтп(Es) + 0.00001))  # %
dC = [0; 1.51784; 0.339296; -0.775975; -1.52612]  # %
# Рис. 3. Графики  функции преобразования  E (T); стандартной зависимости Еs(T); поправки С, ^оС; относительного отклонения dС,%
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# Оценка погрешности термодатчиков (цифровой и ртурный термометры)
Ts = [35.5464; 40.3048; 47.0403]  # ^oC
Tцифр := [35.4; 40.3; 45.5]
Tртут := [35.3; 40.3; 45.2]  # ^оС
# СКО  индивидуального измерения (смещенное) ΔTцифр
ΔTцифр := sqrt(sum((Tцифр[i] - Ts[i])^2/3, i = 1 .. 3))
ΔTцифр = 0.893277  # ^оС
# СКО  индивидуального измерения (смещенное) ΔTртут
ΔTртут := sqrt(sum((Tртут[i] - Ts[i])^2/3, i = 1 .. 3))
ΔTртут = 1.07195  # ^оС
