# Оценка систематической погрешности манометра МИДА
ORIGIN ≡ 1
# Пусть в результате эксперимента получены данные(и после первичной обработки)
n := 7
i := 1 .. n
Pmida := [
    71.138, 70.856, 70.856, 70.846;
    91.04, 91.06, 91.016, 91.032;
    111.242, 111.291, 111.209, 111.226;
    131.436, 131.404, 131.51, 131.442;
    151.621, 151.632, 151.791, 152.365;
    171.782, 171.823, 171.788, 171.827;
    191.963, 191.963, 191.937, 191.937
]  # кгс/см^2
# Найдем среднее в каждой строке:
Pk[i] := sum(Pmida[i, k]/4, k = 1 .. 4)
Pk = [70.924; 91.037; 111.242; 131.448; 151.852; 171.805; 191.95]
Дисперсия(несмещенная)
Pdispk[i] := sum((Pmida[i, k] - Pk[i])^2/(4 - 1), k = 1 .. 4)
Pdispk = [0.020376; 0.000334667; 0.00124867; 0.00198667; 0.122884; 0.000542; 0.000225333]
# СКО среднего
σav := Pdispk/sqrt(4)
σav = [0.010188; 0.000167333; 0.000624333; 0.000993333; 0.0614418; 0.000271; 0.000112667]  # кгс/см^2
α := 0.95
tα := 3.18
Δ := tα*σav
(Δ - величина)*случайной*погрешности
Δ = [0.0323978; 0.00053212; 0.00198538; 0.0031588; 0.195385; 0.00086178; 0.00035828]
# кгс/см^2
Δ = [0.0323978; 0.00053212; 0.00198538; 0.0031588; 0.195385; 0.00086178; 0.00035828]  # кгс/см^2
Pk = [70.924; 91.037; 111.242; 131.448; 151.852; 171.805; 191.95]
# Нижная граница | Верхняя граница
# кгс/см^2
Pk - Δ = [70.8916; 91.0365; 111.24; 131.445; 151.657; 171.804; 191.95]  # кгс/см^2
Pk + Δ = [70.9564; 91.0375; 111.244; 131.451; 152.048; 171.806; 191.95]
