# Worksheet setting: ORIGIN = 1
# Лабораторная работа N 3
# Протокол измерений
# Ввод экспериментальных данных.
# Серия 1
# Количество измерений, n
ORIGIN ≡ 1
n := 7
i := 1 .. n
В := 760  # мм рт. ст.
# Температура воздуха
t := 24  # ^oC
# P - давление (локальное, избыточное) поршневого манометра, кгс/см^2, считанное с грузов
# p - давление (локальное, избыточное) пружинного манометра, деления, считанное по шкале
# P - давление поршневого манометра | p - давление пружинного манометра
# кгс/см^2
p := [
    110.0, 110.0, 110.0, 110.0;
    141.5, 141.5, 141.5, 141.5;
    172.5, 172.5, 172.5, 172.5;
    204.0, 204.0, 203.5, 204;
    235.0, 235.0, 235.5, 236.5;
    266.5, 266.5, 266.5, 267.5;
    297.5, 297.5, 298.5, 298.5
]  # деления
P := [70; 90; 110; 130; 150; 170; 190]
# Напряжение манометра МИДА U_mida, В
Umida := [
    2.42270, 2.41722, 2.41722, 2.41703;
    2.80893, 2.80931, 2.80846, 2.80878;
    3.20099, 3.20194, 3.20034, 3.20068;
    3.59287, 3.59226, 3.59431, 3.59300;
    3.98460, 3.98481, 3.98791, 3.99904;
    4.37585, 4.37665, 4.37597, 4.37673;
    4.76750, 4.76750, 4.76699, 4.76699
]  # В
# Pmida -  избыточное давление манометра МИДА, МПа
# Расчетное уравнение для Pmida,
Uo := 1.04215  # В
Pmida := (Umida - Uo)*20/(5 - Uo)  # МПа
# Ускорение свободного падения стандартное
g := 9.80665  # м/с^2
# Pkmida -давление манометра МИДА, кгс/см^2
Pkmida := Pmida/(g*10^-2)  # кгс/см^2
Pkmida = [
    71.1381, 70.8557, 70.8557, 70.8459;
    91.04, 91.0596, 91.0158, 91.0323;
    111.242, 111.291, 111.209, 111.226;
    131.436, 131.404, 131.51, 131.442;
    151.621, 151.632, 151.791, 152.365;
    171.782, 171.823, 171.788, 171.827;
    191.963, 191.963, 191.937, 191.937
]  # кгс/см^2
# Ускорение свободного падения для Москвы
gMos := 9.8156  # м/с^2
# Рабочая площадь поршня
F := 0.050000  # см^2
# Погрешность ΔF измерения площади поршня F
ΔF := 0.0003*F  # см^2
# Поправка на ускорение свободного падения
ΔPg[i] := P[i]*(gMos/g - 1)  # кгс/см^2
# Коэффициент линейного расширения α материала поршня, 1/К
α := 11.5*10^-6
1/К
# Поправка на температурное расширение поршня
ΔPt[i] := -2*α*P[i]*(t - 20)  # кгс/см^2
# Плотность воздуха при нормальных условиях
ρвозд := 1.2*10^-3  # г/см^3
# Плотность материала грузов
ρgr := 7.8  # г/см^3
# Давление (локальное) поршневого манометра
# с учетом трех поправок (на выталкивающую силу,
# на температурную деформацию и на ускорение
# свободного падения), кгс/см^2
Pizm[i] := P[i]*(1 - ρвозд/ρgr) + ΔPt[i] + ΔPg[i]
Pizm = [70.0467; 90.06; 110.073; 130.087; 150.1; 170.113; 190.127]
# Среднее значение давленияPav для пружинного манометра, дел
Pav[i] := sum(p[i, k]/4, k = 1 .. 4)  # дел
Pav = [110; 141.5; 172.5; 203.875; 235.5; 266.75; 298]
# Среднее значение давленияPk по манометру МИДА, кгс/см^2
Pk[i] := sum(Pkmida[i, k]/4, k = 1 .. 4)  # кгс/см^2
Pk = [70.9238; 91.037; 111.242; 131.448; 151.852; 171.805; 191.95]
# Результат поверки пружинного манометра
# Экспериментальное значение поправки С (абсолютная, кгс/см^2)
# к показанию пружинного манометра
C[i] := Pizm[i] - Pav[i]*0.625  # кгс/см^2
C = [1.29668; 1.62251; 2.26085; 2.66481; 2.91252; 3.39461; 3.87669]
# Поправка f  (относительная,%) к показанию пружинного манометра
f[i] := C[i]*100/Pizm[i]  # %
f = [1.85116; 1.80159; 2.05395; 2.04849; 1.94039; 1.9955; 2.039]
# Результат поверки манометра МИДА
# Экспериментальное значение поправки Сm (абсолютная, кгс/см^2)
# к показанию манометра МИДА
Cm[i] := Pizm[i] - Pk[i]  # кгс/см^2
Cm = [-0.877171; -0.976941; -1.16895; -1.36121; -1.75225; -1.69138; -1.82297]
# Поправка fm  (относительная,%) к показанию  манометра МИДА
fm[i] := Cm[i]*100/Pizm[i]  # %
fm = [-1.25227; -1.08477; -1.06197; -1.04639; -1.16739; -0.994265; -0.958816]
# Средняя относительная поправка fmav для манометра МИДА.
# fmav является постоянной средней величиной
fmav := sum(fm[k]/n, k = 1 .. 7)  # %
fmav = -1.08084
# Аналитическая зависимость поправки C_m для манометра МИДА.  Аргументом является давление Рпруж.
# Расчет по методу наименьших квадратов (линейная зависимость С_аналит (P_пруж)).
Y(x) := [1; x]
s := linfit(Pav, Cm, Y)
# Сmаналит[i] -  поправка  (аналитическая) для манометра МИДА, кгс/см^2
Сmаналит[i] := 1*s[1] + Pav[i]*s[2]  # кгс/см^2
Сmаналит = [-0.859; -1.03312; -1.20448; -1.37791; -1.55272; -1.72545; -1.89819]
# Среднее квадратичное отклонение (не смещенное)
# индивидуального давления пружинного манометра, дел.
σ[i] := sqrt(sum((p[i, k] - Pav[i])^2/(4 - 1), k = 1 .. 4))
σ = [0; 0; 0; 0.25; 0.707107; 0.5; 0.57735]
# Случайная погрешность для давления пружинного манометра
# Коэффициент Стьюдента для доверительной
# вероятности α=0.95
# и n=4
trst := 2.78
# Среднее квадратичное отклонение (не смещенное)
# среднего давления пружинного манометра, дел
ΔPcase[i] := trst*sqrt(sum((p[i, k] - Pav[i])^2/(4*(4 - 1)), k = 1 .. 4))
ΔPcase = [0; 0; 0; 0.3475; 0.982878; 0.695; 0.802517]
# Абсолютные допускаемые  основные погрешностьи пружинного манометра:
# Δdevice (дел) и ΔPдопус (кгс/см^2).Класс точности, γ, пружинного манометра.
γ := 0.15
Δdevice := γ*400/100  # дел.
ΔPдопус := Δdevice*0.625  # кгс/см^2
ΔPдопус = 0.375  # кгс/см^2  # (у МП600 класс точности 0.05%)
# Допустимая погрешность поршневого манометраΔPgr
# 1) при использовании грузов -дисков ΔPgr, кгс/см^2
ΔPgr := 0.0005*Pizm
ΔPgr = [0.0350233; 0.04503; 0.0550367; 0.0650433; 0.07505; 0.0850567; 0.0950633]
# Оценка абсолютной погрешности ΔP, кгс/см^2, пружинного манометра после внесения поправки С (сделать сравнение спогрешностью_*0.625*ΔPcase[i] )
ΔP[i] := sqrt(ΔPgr[i]^2 + (0.625*ΔPcase[i])^2)
ΔP = [0.0350233; 0.04503; 0.0550367; 0.226718; 0.618867; 0.442624; 0.510502]
Pav = [110; 141.5; 172.5; 203.875; 235.5; 266.75; 298]
ΔPcase*0.625 = [0; 0; 0; 0.217187; 0.614299; 0.434375; 0.501573]
Pav[i]*0.625 = [68.75; 88.4375; 107.812; 127.422; 147.188; 166.719; 186.25]
# Аналитическая зависимость поправки C для  давления пружинного манометра. Аргументом является давление Р_пруж.
# Расчет по методу наименьщих квадратов (линейная зависимость С_аналит (P_пруж)).
Y(x) := [1; x]
s := linfit(Pav, C, Y)
s = [-0.199077; 0.0135998]
# Саналит[i] -  поправка  (аналитическая) для пружинного манометра, кгс/см^2
Саналит[i] := 1*s[1] + Pav[i]*s[2]  # кгс/см^2
Саналит = [1.2969; 1.72529; 2.14689; 2.57358; 3.00367; 3.42867; 3.85366]
# Зависимость относительной поправки f от давления Р_пруж.
# fav является постоянной средней величиной
fav := sum(f[k]/n, k = 1 .. n)
fav = 1.96144  # %
# Рис. 1  Показания поршневого манометра. Среднее давление по пружинному манометру. Средние давление по манометру МИДА (Серия 1)
# Обозначения
# x  -показания пружинного манометра,  кгс/см^2
# + -  показания поршневого манометра
# о -  показания МИДА
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# Рис. 2  Графические результаты поверки поршневого манометра и МИДА. Серия 1
# Обозначения
# x  -поправка С (эксперимент) для пружинного манометра, полученная при поверке, кгс/см^2
# Саналит[i] -  поправка  (аналитическая) для пружинного манометра, кгс/см^2
# -- --- --
# поправка f (относительная, %) для показаний пружинного манометра, полученная в эксперименте
# -- . -- .--
# случайная погрешность, кгс/см^2,  для показаний пружинного манометра,
# ---------
# ΔPcase[i]*0.625 - среднеквадратическое отклонение для показаний пружинного манометра, кгс/см^2
# ........ | поправка fav (относительная, аналитическая, %) | для показаний пружинного манометра,
ΔPдопус - допустимая - погрешность - пружинного - манометра - паспорт, кгс/см^2
# ΔPgr[i] | -погрешность поршневого манометра (паспорт), кгс/см^2
# Сmаналит[i] -  поправка  (аналитическая) для манометра МИДА, кгс/см^2
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# fmav -среднее знчение относительной поправки для МИДА (%)
# Рис. 3  Графические результаты поверки манометра МИДА.. Серия 1
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кг
