# Вычисление значений величин для расчетного здания по теме трехфазные цепи с применением  пакета MathCAD 15. Вариант численных данных-10
Номинальное*напряжение, В, 1 - 3
U1 := 220
U2 := 220
U3 := 220
U4 := 220
Фазное, В, 4
P1 := 39*10^3
P2 := 45.5*10^3
P3 := 58.5*10^3
P4 := 91*10^3  # Мощность приемника, Вт
cosf1 := 1
cosf2 := 0.8
sinf1 := sqrt(1 - cosf1^2) = 0
sinf2 := sqrt(1 - cosf2^2) = 0.6
cosf3 := 0.7
cosf4 := 0.85
sinf3 := sqrt(1 - cosf3^2) = 0.714143
sinf4 := sqrt(1 - cosf4^2) = 0.526783
p := π/180
# <<------ нужно для перевода из градусов в радианы
j := sqrt(-1)  # мнимая единица
# 1. Найдем сопротивления Z(пока лишь модуль Z) всех фаз, а так же R(активное) и X(реактивное индуктивное или емкостное,смотря какой род приемника)
Z11 := U1^2/P1*cosf1 = 1.24103
Z22 := U2^2/P2*cosf2 = 0.850989
R1 := Z11*cosf1 = 1.24103
R2 := Z22*cosf2 = 0.680791
X1 := Z11*sinf1 = 0
X2 := Z22*sinf2 = 0.510593
Z33 := U3^2/P3*cosf3 = 0.579145
Z44 := U4^2/P4*cosf4 = 0.452088
R3 := Z33*cosf3 = 0.405402
R4 := Z44*cosf4 = 0.384275
X3 := Z33*sinf3 = 0.413592
X4 := Z44*sinf4 = 0.238152
# 2. Найдем углы
f1 := acos(cosf1)*1/p = 0
f3 := -acos(cosf3)*1/p = -45.573  # минусы перед acos(cos) из-за емкостного характера приемника
f2 := acos(cosf2)*1/p = 36.8699
f4 := acos(cosf4)*1/p = 31.7883
# Комлпексные сопротивления
Z1 := Z11*e^(f1*p*j) = 1.24103
Z2 := Z22*e^(f2*p*j) = 0.680791 + 0.510593i
Z3 := Z33*e^(f3*p*j) = 0.405402 - 0.413592i
Z4 := Z44*e^(f4*p*j) = 0.384275 + 0.238152i
# 3. Найдем токи в приемниках(все кроме трехфазного)
Ua2 := U1*e^(0*p*j) = 220
Ub2 := U2*e^(-120*p*j) = -110 - 190.526i
Uc2 := U3*e^(120*p*j) = -110 + 190.526i
Uab2 := Ua2 - Ub2 = 330 + 190.526i
Ubc2 := Ub2 - Uc2 = -381.051i
Uca2 := Uc2 - Ua2 = -330 + 190.526i
IA2 := Ua2/Z1 = 177.273
IB2 := Ub2/Z2 = -237.741 - 101.553i
IC2 := Uc2/Z3 = -367.891 + 94.6433i
# Найдем напряжения и токи в трехфазном симметричном приемнике
Ua1 := U4*e^(0*j) = 220
Ub1 := U4*e^(-120*p*j) = -110 - 190.526i
Uc1 := U4*e^(120*p*j) = -110 + 190.526i
Uab1 := Ua1 - Ub1 = 330 + 190.526i
Ubc1 := Ub1 - Uc1 = -381.051i
Uca1 := Uc1 - Ua1 = -330 + 190.526i
IA1 := Ua1/Z4 = 413.636 - 256.349i  # Найдем общие токи:
IA := IA1 + IA2 = 590.909 - 256.349i
IB1 := Ub1/Z4 = -428.823 - 230.045i
IB := IB1 + IB2 = -666.564 - 331.598i
IC1 := Uc1/Z4 = 15.1864 + 486.394i
IC := IC1 + IC2 = -352.705 + 581.037i
IN := IA + IB + IC = -428.36 - 6.90972i
