# Вычисление значений величин для расчетного здания по теме трехфазные цепи с применением  пакета MathCAD 15. Вариант численных данных-18
Номинальное*напряжение, В, 1 - 3
U1 := 220
U2 := 220
U3 := 220
U4 := 127
Фазное, В, 4
P1 := 26*10^3
Q2 := 26*10^3
P3 := 45.5*10^3
P4 := 97.5*10^3  # Мощность приемника, Вт
cosf1 := 1
cosf2 := 0
sinf1 := sqrt(1 - cosf1^2) = 0
sinf2 := sqrt(1 - cosf2^2) = 1
cosf3 := 0.8
cosf4 := 0.75
sinf3 := sqrt(1 - cosf3^2) = 0.6
sinf4 := sqrt(1 - cosf4^2) = 0.661438
p := π/180
# <<------ нужно для перевода из градусов в радианы
j := sqrt(-1)  # мнимая единица
# 1. Найдем сопротивления Z(пока лишь модуль Z) всех фаз, а так же R(активное) и X(реактивное индуктивное или емкостное,смотря какой род приемника)
Z11 := U1^2/P1*cosf1 = 1.86154
Z22 := U2^2/Q2*sinf2 = 1.86154
R1 := Z11*cosf1 = 1.86154
R2 := Z22*cosf2 = 0
X1 := Z11*sinf1 = 0
X2 := Z22*sinf2 = 1.86154
Z33 := U3^2/P3*cosf3 = 0.850989
Z44 := U4^2/P4*cosf4 = 0.124069
R3 := Z33*cosf3 = 0.680791
R4 := Z44*cosf4 = 0.0930519
X3 := Z33*sinf3 = 0.510593
X4 := Z44*sinf4 = 0.0820641
# 2. Найдем углы
f1 := acos(cosf1)*1/p = 0
f3 := -acos(cosf3)*1/p = -36.8699  # минусы перед acos(cos) из-за емкостного характера приемника
f2 := -acos(cosf2)*1/p = -90
f4 := acos(cosf4)*1/p = 41.4096
# Комлпексные сопротивления
Z1 := Z11*e^(f1*p*j) = 1.86154
Z2 := Z22*e^(f2*p*j) = -1.86154i
Z3 := Z33*e^(f3*p*j) = 0.680791 - 0.510593i
Z4 := Z44*e^(f4*p*j) = 0.0930519 + 0.0820641i
# 3. Найдем токи в приемниках(все кроме трехфазного)
Ua2 := U1*e^(0*p*j) = 220
Ub2 := U2*e^(-120*p*j) = -110 - 190.526i
Uc2 := U3*e^(120*p*j) = -110 + 190.526i
Uab2 := Ua2 - Ub2 = 330 + 190.526i
Ubc2 := Ub2 - Uc2 = -381.051i
Uca2 := Uc2 - Ua2 = -330 + 190.526i
IA2 := Ua2/Z1 = 118.182
IB2 := Ub2/Z2 = 102.348 - 59.0909i
IC2 := Uc2/Z3 = -237.741 + 101.553i
# Найдем напряжения и токи в трехфазном симметричном приемнике
Ua1 := U4*e^(0*j) = 127
Ub1 := U4*e^(-120*p*j) = -63.5 - 109.985i
Uc1 := U4*e^(120*p*j) = -63.5 + 109.985i
Uab1 := Ua1 - Ub1 = 190.5 + 109.985i
Ubc1 := Ub1 - Uc1 = -219.97i
Uca1 := Uc1 - Ua1 = -190.5 + 109.985i
IA1 := Ua1/Z4 = 767.717 - 677.062i  # Найдем общие токи:
IA := IA1 + IA2 = 885.898 - 677.062i
IB1 := Ub1/Z4 = -970.211 - 326.331i
IB := IB1 + IB2 = -867.863 - 385.422i
IC1 := Uc1/Z4 = 202.495 + 1003.39i
IC := IC1 + IC2 = -35.2465 + 1104.95i
IN := IA + IB + IC = -17.2112 + 42.4621i
