# Вычисление значений величин для расчетного здания по теме трехфазные цепи с применением  пакета MathCAD 15. Вариант численных данных-23
Номинальное*напряжение, В, 1 - 3
U1 := 127
U2 := 127
U3 := 127
U4 := 127
Фазное, В, 4
P1 := 19.5*10^3
P2 := 97.5*10^3
Q3 := 26*10^3
P4 := 52*10^3  # Мощность приемника, Вт
cosf1 := 1
cosf2 := 0.8
sinf1 := sqrt(1 - cosf1^2) = 0
sinf2 := sqrt(1 - cosf2^2) = 0.6
cosf3 := 0
cosf4 := 0.85
sinf3 := sqrt(1 - cosf3^2) = 1
sinf4 := sqrt(1 - cosf4^2) = 0.526783
p := π/180
# <<------ нужно для перевода из градусов в радианы
j := sqrt(-1)  # мнимая единица
# 1. Найдем сопротивления Z(пока лишь модуль Z) всех фаз, а так же R(активное) и X(реактивное индуктивное или емкостное,смотря какой род приемника)
Z11 := U1^2/P1*cosf1 = 0.827128
Z22 := U2^2/P2*cosf2 = 0.132341
R1 := Z11*cosf1 = 0.827128
R2 := Z22*cosf2 = 0.105872
X1 := Z11*sinf1 = 0
X2 := Z22*sinf2 = 0.0794043
Z33 := U3^2/Q3*sinf3 = 0.620346
Z44 := U4^2/P4*cosf4 = 0.263647
R3 := Z33*cosf3 = 0
R4 := Z44*cosf4 = 0.2241
X3 := Z33*sinf3 = 0.620346
X4 := Z44*sinf4 = 0.138885
# 2. Найдем углы
f1 := acos(cosf1)*1/p = 0
f3 := -acos(cosf3)*1/p = -90  # минусы перед acos(cos) из-за емкостного характера приемника
f2 := -acos(cosf2)*1/p = -36.8699
f4 := acos(cosf4)*1/p = 31.7883
# Комлпексные сопротивления
Z1 := Z11*e^(f1*p*j) = 0.827128
Z2 := Z22*e^(f2*p*j) = 0.105872 - 0.0794043i
Z3 := Z33*e^(f3*p*j) = -0.620346i
Z4 := Z44*e^(f4*p*j) = 0.2241 + 0.138885i
# 3. Найдем токи в приемниках(все кроме трехфазного)
Ua2 := U1*e^(0*p*j) = 127
Ub2 := U2*e^(-120*p*j) = -63.5 - 109.985i
Uc2 := U3*e^(120*p*j) = -63.5 + 109.985i
Uab2 := Ua2 - Ub2 = 190.5 + 109.985i
Ubc2 := Ub2 - Uc2 = -219.97i
Uca2 := Uc2 - Ua2 = -190.5 + 109.985i
IA2 := Ua2/Z1 = 153.543
IB2 := Ub2/Z2 = 114.788 - 952.756i
IC2 := Uc2/Z3 = -177.297 - 102.362i
# Найдем напряжения и токи в трехфазном симметричном приемнике
Ua1 := U4*e^(0*j) = 127
Ub1 := U4*e^(-120*p*j) = -63.5 - 109.985i
Uc1 := U4*e^(120*p*j) = -63.5 + 109.985i
Uab1 := Ua1 - Ub1 = 190.5 + 109.985i
Ubc1 := Ub1 - Uc1 = -219.97i
Uca1 := Uc1 - Ua1 = -190.5 + 109.985i
IA1 := Ua1/Z4 = 409.449 - 253.754i  # Найдем общие токи:
IA := IA1 + IA2 = 562.992 - 253.754i
IB1 := Ub1/Z4 = -424.481 - 227.716i
IB := IB1 + IB2 = -309.693 - 1180.47i
IC1 := Uc1/Z4 = 15.0326 + 481.47i
IC := IC1 + IC2 = -162.264 + 379.108i
IN := IA + IB + IC = 91.035 - 1055.12i
