# Вычисление значений величин для расчетного здания по теме трехфазные цепи с применением  пакета MathCAD 15. Вариант численных данных-28
Номинальное*напряжение, В, 1 - 3
U1 := 220
U2 := 220
U3 := 220
U4 := 127
Фазное, В, 4
P1 := 39*10^3
P2 := 65*10^3
P3 := 97.5*10^3
P4 := 26*10^3  # Мощность приемника, Вт
cosf1 := 1
cosf2 := 0.9
sinf1 := sqrt(1 - cosf1^2) = 0
sinf2 := sqrt(1 - cosf2^2) = 0.43589
cosf3 := 1
cosf4 := 0.8
sinf3 := sqrt(1 - cosf3^2) = 0
sinf4 := sqrt(1 - cosf4^2) = 0.6
p := π/180
# <<------ нужно для перевода из градусов в радианы
j := sqrt(-1)  # мнимая единица
# 1. Найдем сопротивления Z(пока лишь модуль Z) всех фаз, а так же R(активное) и X(реактивное индуктивное или емкостное,смотря какой род приемника)
Z11 := U1^2/P1*cosf1 = 1.24103
Z22 := U2^2/P2*cosf2 = 0.670154
R1 := Z11*cosf1 = 1.24103
R2 := Z22*cosf2 = 0.603138
X1 := Z11*sinf1 = 0
X2 := Z22*sinf2 = 0.292113
Z33 := U3^2/P3*cosf3 = 0.49641
Z44 := U4^2/P4*cosf4 = 0.496277
R3 := Z33*cosf3 = 0.49641
R4 := Z44*cosf4 = 0.397022
X3 := Z33*sinf3 = 0
X4 := Z44*sinf4 = 0.297766
# 2. Найдем углы
f1 := acos(cosf1)*1/p = 0
f3 := acos(cosf3)*1/p = 0  # минусы перед acos(cos) из-за емкостного характера приемника
f2 := acos(cosf2)*1/p = 25.8419
f4 := -acos(cosf4)*1/p = -36.8699
# Комлпексные сопротивления
Z1 := Z11*e^(f1*p*j) = 1.24103
Z2 := Z22*e^(f2*p*j) = 0.603138 + 0.292113i
Z3 := Z33*e^(f3*p*j) = 0.49641
Z4 := Z44*e^(f4*p*j) = 0.397022 - 0.297766i
# 3. Найдем токи в приемниках(все кроме трехфазного)
Ua2 := U1/sqrt(3)*e^(0*p*j) = 127.017
Ub2 := U2/sqrt(3)*e^(-120*p*j) = -63.5085 - 110i
Uc2 := U3/sqrt(3)*e^(120*p*j) = -63.5085 + 110i
Uab2 := Ua2 - Ub2 = 190.526 + 110i
Ubc2 := Ub2 - Uc2 = -220i
Uca2 := Uc2 - Ua2 = -190.526 + 110i
IA2 := Ua2/Z1 = 102.348
IB2 := Ub2/Z2 = -156.838 - 106.419i
IC2 := Uc2/Z3 = -127.936 + 221.591i
# Найдем напряжения и токи в трехфазном симметричном приемнике
Ua1 := U4*e^(0*j) = 127
Ub1 := U4*e^(-120*p*j) = -63.5 - 109.985i
Uc1 := U4*e^(120*p*j) = -63.5 + 109.985i
Uab1 := Ua1 - Ub1 = 190.5 + 109.985i
Ubc1 := Ub1 - Uc1 = -219.97i
Uca1 := Uc1 - Ua1 = -190.5 + 109.985i
IA1 := Ua1/Z4 = 204.724 + 153.543i  # Найдем общие токи:
IA := IA1 + IA2 = 307.073 + 153.543i
IB1 := Ub1/Z4 = 30.6102 - 254.068i
IB := IB1 + IB2 = -126.228 - 360.487i
IC1 := Uc1/Z4 = -235.335 + 100.525i
IC := IC1 + IC2 = -363.27 + 322.116i
IN := IA + IB + IC = -182.425 + 115.172i
