# Вычисление значений величин для расчетного здания по теме трехфазные цепи с применением  пакета MathCAD 15. Вариант численных данных-16
Номинальное*напряжение, В, 1 - 3
U1 := 220
U2 := 220
U3 := 220
U4 := 220
Фазное, В, 4
P1 := 97.5*10^3
P2 := 65*10^3
Q3 := 78*10^3
Q4 := 169*10^3  # Мощность приемника, Вт
cosf1 := 1
cosf2 := 0.6
sinf1 := sqrt(1 - cosf1^2) = 0
sinf2 := sqrt(1 - cosf2^2) = 0.8
cosf3 := 0
cosf4 := 0
sinf3 := sqrt(1 - cosf3^2) = 1
sinf4 := sqrt(1 - cosf4^2) = 1
p := π/180
# <<------ нужно для перевода из градусов в радианы
j := sqrt(-1)  # мнимая единица
# 1. Найдем сопротивления Z(пока лишь модуль Z) всех фаз, а так же R(активное) и X(реактивное индуктивное или емкостное,смотря какой род приемника)
Z11 := U1^2/P1*cosf1 = 0.49641
Z22 := U2^2/P2*cosf2 = 0.446769
R1 := Z11*cosf1 = 0.49641
R2 := Z22*cosf2 = 0.268062
X1 := Z11*sinf1 = 0
X2 := Z22*sinf2 = 0.357415
Z33 := U3^2/Q3*sinf3 = 0.620513
Z44 := U4^2/Q4*sinf4 = 0.286391
R3 := Z33*cosf3 = 0
R4 := Z44*cosf4 = 0
X3 := Z33*sinf3 = 0.620513
X4 := Z44*sinf4 = 0.286391
# 2. Найдем углы
f1 := acos(cosf1)*1/p = 0
f3 := -acos(cosf3)*1/p = -90  # минусы перед acos(cos) из-за емкостного характера приемника
f2 := -acos(cosf2)*1/p = -53.1301
f4 := -acos(cosf4)*1/p = -90
# Комлпексные сопротивления
Z1 := Z11*e^(f1*p*j) = 0.49641
Z2 := Z22*e^(f2*p*j) = 0.268062 - 0.357415i
Z3 := Z33*e^(f3*p*j) = -0.620513i
Z4 := Z44*e^(f4*p*j) = -0.286391i
# 3. Найдем токи в приемниках(все кроме трехфазного)
Ua2 := U1*e^(0*p*j) = 220
Ub2 := U2*e^(-120*p*j) = -110 - 190.526i
Uc2 := U3*e^(120*p*j) = -110 + 190.526i
Uab2 := Ua2 - Ub2 = 330 + 190.526i
Ubc2 := Ub2 - Uc2 = -381.051i
Uca2 := Uc2 - Ua2 = -330 + 190.526i
IA2 := Ua2/Z1 = 443.182
IB2 := Ub2/Z2 = 193.434 - 452.841i
IC2 := Uc2/Z3 = -307.045 - 177.273i
# Найдем напряжения и токи в трехфазном симметричном приемнике
Ua1 := U4*e^(0*j) = 220
Ub1 := U4*e^(-120*p*j) = -110 - 190.526i
Uc1 := U4*e^(120*p*j) = -110 + 190.526i
Uab1 := Ua1 - Ub1 = 330 + 190.526i
Ubc1 := Ub1 - Uc1 = -381.051i
Uca1 := Uc1 - Ua1 = -330 + 190.526i
IA1 := Ua1/Z4 = 768.182i  # Найдем общие токи:
IA := IA1 + IA2 = 443.182 + 768.182i
IB1 := Ub1/Z4 = 665.265 - 384.091i
IB := IB1 + IB2 = 858.699 - 836.932i
IC1 := Uc1/Z4 = -665.265 - 384.091i
IC := IC1 + IC2 = -972.31 - 561.364i
IN := IA + IB + IC = 329.571 - 630.114i
