# Вычисление значений величин для расчетного здания по теме трехфазные цепи с применением  пакета MathCAD 15. Вариант численных данных-16
Номинальное*напряжение, В, 1 - 3
U1 := 220
U2 := 220
U3 := 220
U4 := 220
Фазное, В, 4
P1 := 90*10^3
P2 := 60*10^3
Q3 := 72*10^3
Q4 := 156*10^3  # Мощность приемника, Вт
cosf1 := 1
cosf2 := 0.6
sinf1 := sqrt(1 - cosf1^2) = 0
sinf2 := sqrt(1 - cosf2^2) = 0.8
cosf3 := 0
cosf4 := 0
sinf3 := sqrt(1 - cosf3^2) = 1
sinf4 := sqrt(1 - cosf4^2) = 1
p := π/180
# <<------ нужно для перевода из градусов в радианы
j := sqrt(-1)  # мнимая единица
# 1. Найдем сопротивления Z(пока лишь модуль Z) всех фаз, а так же R(активное) и X(реактивное индуктивное или емкостное,смотря какой род приемника)
Z11 := U1^2/P1*cosf1 = 0.537778
Z22 := U2^2/P2*cosf2 = 0.484
R1 := Z11*cosf1 = 0.537778
R2 := Z22*cosf2 = 0.2904
X1 := Z11*sinf1 = 0
X2 := Z22*sinf2 = 0.3872
Z33 := U3^2/Q3*sinf3 = 0.672222
Z44 := U4^2/Q4*sinf4 = 0.310256
R3 := Z33*cosf3 = 0
R4 := Z44*cosf4 = 0
X3 := Z33*sinf3 = 0.672222
X4 := Z44*sinf4 = 0.310256
# 2. Найдем углы
f1 := acos(cosf1)*1/p = 0
f3 := -acos(cosf3)*1/p = -90  # минусы перед acos(cos) из-за емкостного характера приемника
f2 := -acos(cosf2)*1/p = -53.1301
f4 := -acos(cosf4)*1/p = -90
# Комлпексные сопротивления
Z1 := Z11*e^(f1*p*j) = 0.537778
Z2 := Z22*e^(f2*p*j) = 0.2904 - 0.3872i
Z3 := Z33*e^(f3*p*j) = -0.672222i
Z4 := Z44*e^(f4*p*j) = -0.310256i
# 3. Найдем токи в приемниках(все кроме трехфазного)
Ua2 := U1*e^(0*p*j) = 220
Ub2 := U2*e^(-120*p*j) = -110 - 190.526i
Uc2 := U3*e^(120*p*j) = -110 + 190.526i
Uab2 := Ua2 - Ub2 = 330 + 190.526i
Ubc2 := Ub2 - Uc2 = -381.051i
Uca2 := Uc2 - Ua2 = -330 + 190.526i
IA2 := Ua2/Z1 = 409.091
IB2 := Ub2/Z2 = 178.555 - 418.007i
IC2 := Uc2/Z3 = -283.426 - 163.636i
# Найдем напряжения и токи в трехфазном симметричном приемнике
Ua1 := U4*e^(0*j) = 220
Ub1 := U4*e^(-120*p*j) = -110 - 190.526i
Uc1 := U4*e^(120*p*j) = -110 + 190.526i
Uab1 := Ua1 - Ub1 = 330 + 190.526i
Ubc1 := Ub1 - Uc1 = -381.051i
Uca1 := Uc1 - Ua1 = -330 + 190.526i
IA1 := Ua1/Z4 = 709.091i  # Найдем общие токи:
IA := IA1 + IA2 = 409.091 + 709.091i
IB1 := Ub1/Z4 = 614.091 - 354.545i
IB := IB1 + IB2 = 792.645 - 772.552i
IC1 := Uc1/Z4 = -614.091 - 354.545i
IC := IC1 + IC2 = -897.517 - 518.182i
IN := IA + IB + IC = 304.219 - 581.643i
