# Вычисление значений величин для расчетного здания по теме трехфазные цепи с применением  пакета MathCAD 15. Вариант численных данных-15
Номинальное*напряжение, В, 1 - 3
U1 := 220
U2 := 220
U3 := 220
U4 := 220
Фазное, В, 4
P1 := 65*10^3
P2 := 78*10^3
P3 := 26*10^3
P4 := 52*10^3  # Мощность приемника, Вт
cosf1 := 0.8
cosf2 := 1
sinf1 := sqrt(1 - cosf1^2) = 0.6
sinf2 := sqrt(1 - cosf2^2) = 0
cosf3 := 0.2
cosf4 := 1
sinf3 := sqrt(1 - cosf3^2) = 0.979796
sinf4 := sqrt(1 - cosf4^2) = 0
p := π/180
# <<------ нужно для перевода из градусов в радианы
j := sqrt(-1)  # мнимая единица
# 1. Найдем сопротивления Z(пока лишь модуль Z) всех фаз, а так же R(активное) и X(реактивное индуктивное или емкостное,смотря какой род приемника)
Z11 := U1^2/P1*cosf1 = 0.595692
Z22 := U2^2/P2*cosf2 = 0.620513
R1 := Z11*cosf1 = 0.476554
R2 := Z22*cosf2 = 0.620513
X1 := Z11*sinf1 = 0.357415
X2 := Z22*sinf2 = 0
Z33 := U3^2/P3*cosf3 = 0.372308
Z44 := U4^2/P4*cosf4 = 0.930769
R3 := Z33*cosf3 = 0.0744615
R4 := Z44*cosf4 = 0.930769
X3 := Z33*sinf3 = 0.364786
X4 := Z44*sinf4 = 0
# 2. Найдем углы
f1 := acos(cosf1)*1/p = 36.8699
f3 := -acos(cosf3)*1/p = -78.463  # минусы перед acos(cos) из-за емкостного характера приемника
f2 := acos(cosf2)*1/p = 0
f4 := acos(cosf4)*1/p = 0
# Комлпексные сопротивления
Z1 := Z11*e^(f1*p*j) = 0.476554 + 0.357415i
Z2 := Z22*e^(f2*p*j) = 0.620513
Z3 := Z33*e^(f3*p*j) = 0.0744615 - 0.364786i
Z4 := Z44*e^(f4*p*j) = 0.930769
# 3. Найдем токи в приемниках(все кроме трехфазного)
Ua2 := U1*e^(0*p*j) = 220
Ub2 := U2*e^(-120*p*j) = -110 - 190.526i
Uc2 := U3*e^(120*p*j) = -110 + 190.526i
Uab2 := Ua2 - Ub2 = 330 + 190.526i
Ubc2 := Ub2 - Uc2 = -381.051i
Uca2 := Uc2 - Ua2 = -330 + 190.526i
IA2 := Ua2/Z1 = 295.455 - 221.591i
IB2 := Ub2/Z2 = -177.273 - 307.045i
IC2 := Uc2/Z3 = -560.494 - 187.137i
# Найдем напряжения и токи в трехфазном симметричном приемнике
Ua1 := U4*e^(0*j) = 220
Ub1 := U4*e^(-120*p*j) = -110 - 190.526i
Uc1 := U4*e^(120*p*j) = -110 + 190.526i
Uab1 := Ua1 - Ub1 = 330 + 190.526i
Ubc1 := Ub1 - Uc1 = -381.051i
Uca1 := Uc1 - Ua1 = -330 + 190.526i
IA1 := Ua1/Z4 = 236.364  # Найдем общие токи:
IA := IA1 + IA2 = 531.818 - 221.591i
IB1 := Ub1/Z4 = -118.182 - 204.697i
IB := IB1 + IB2 = -295.455 - 511.742i
IC1 := Uc1/Z4 = -118.182 + 204.697i
IC := IC1 + IC2 = -678.676 + 17.5602i
IN := IA + IB + IC = -442.312 - 715.773i
