U1 := 220
U2 := 220
U3 := 220
U4 := 220
j := sqrt(-1)
Q1 := 78*10^3
P2 := 13*10^3
P3 := 195*10^3
P4 := 273*10^3
p := π/180  # <<------ нужно для перевода из градусов в радианы
cosf1 := 0
sinf1 := 1
cosf2 := 0.8
cosf3 := 0.87
cosf4 := 1
# 1. Найдем сопротивления Z всех фаз
Z11 := U1^2/Q1*sinf1 = 0.620513
Z22 := U2^2/P2*cosf2 = 2.97846
Z33 := U3^2/P3*cosf3 = 0.215938
Z44 := U4^2/P4*cosf4*3 = 0.531868
# 2. Найдем углы
f1 := acos(cosf1)*1/p = 90
f3 := acos(cosf3)*1/p = 29.5414  # минусы перед acos(cos) если у вас емкостной характер
f2 := -acos(cosf2)*1/p = -36.8699
f4 := acos(cosf4)*1/p = 0
Z1 := Z11*e^(f1*p*j) = 0.620513i
Z2 := Z22*e^(f2*p*j) = 2.38277 - 1.78708i
Z3 := Z33*e^(f3*p*j) = 0.187866 + 0.106469i
Z4 := Z44*e^(f4*p*j) = 0.531868
# 3. Найдем токи в приемниках
Ua2 := U1*e^(0*p*j) = 220
# отсылка на гея тыврона дауна любимки хуесоса для будущих поколений
Ub2 := U2*e^(-120*p*j) = -110 - 190.526i
Uc2 := U3*e^(120*p*j) = -110 + 190.526i
Uab2 := Ua2 - Ub2 = 330 + 190.526i
Ubc2 := Ub2 - Uc2 = -381.051i
Uca2 := Uc2 - Ua2 = -330 + 190.526i
IA2 := Ua2/Z1 = -354.545i
IB2 := Ub2/Z2 = 8.83522 - 73.3333i
IC2 := Uc2/Z3 = -8.15524 + 1018.78i
# Найдем напряжения и токи в трехфазном симметричном приемнике
Ua1 := U4*e^(0*j) = 220
Ub1 := U4*e^(-120*p*j) = -110 - 190.526i
Uc1 := U4*e^(120*p*j) = -110 + 190.526i
Uab1 := Ua1 - Ub1 = 330 + 190.526i
Ubc1 := Ub1 - Uc1 = -381.051i
Uca1 := Uc1 - Ua1 = -330 + 190.526i
IA1 := Ua1/Z4 = 413.636
IB1 := Ub1/Z4 = -206.818 - 358.22i
IC1 := Uc1/Z4 = -206.818 + 358.22i
# Найдем общие токи:
IA := IA1 + IA2 = 413.636 - 354.545i
IB := IB1 + IB2 = -197.983 - 431.553i
IC := IC1 + IC2 = -214.973 + 1377i
IN := IA + IB + IC = 0.679975 + 590.897i
